<?xml version="1.0"?>
<?xml-stylesheet type="text/xsl" href="http://jsbsim.sourceforge.net/JSBSim.xsl"?>

<!--
##############################################
# Copyright (c) Joshua Davidson (it0uchpods) #
##############################################
-->

<fdm_config name="IDG-A32X" version="2.0" release="BETA"
xmlns:xsi="http://www.w3.org/2001/XMLSchema-instance"
xsi:noNamespaceSchemaLocation="http://jsbsim.sourceforge.net/JSBSim.xsd">

	<fileheader>
		<author>Joshua Davidson (it0uchpods)</author>
		<version>Pre V1.0</version>
		<description>A32X FDE</description>
	</fileheader>

	<metrics>
		<!--<wing_incidence      >    1.03 </wing_incidence>-->
		<htailarea unit="FT2">  334.24 </htailarea>
		<htailarm  unit="FT" >   57.88 </htailarm>
		<vtailarea unit="FT2">  248.79 </vtailarea>
		<vtailarm  unit="FT" >   57.33 </vtailarm>

        <wingarea unit="M2">141.014</wingarea>
        <wing_incidence unit="">0</wing_incidence>
        <wingspan unit="M">37.059</wingspan>
        <chord unit="">4.82</chord>

        <location unit="M" name="AERORP">
            <x>16.1</x>
            <y>0</y>
            <z>0</z>
        </location>
        <location name="EYEPOINT" unit="M">
			<x> 0 </x>
			<y> 0 </y>
			<z> 0 </z>
		</location>

		<location name="VRP" unit="M">
			<x> 18.8499 </x>
			<y> 0 </y>
			<z> -1.7005004 </z>
		</location>
	</metrics>

	<mass_balance>
		<ixx unit="SLUG*FT2">  611903 </ixx>
		<iyy unit="SLUG*FT2"> 1735389 </iyy>
		<izz unit="SLUG*FT2"> 2301293 </izz>

		<ixy unit="SLUG*FT2">       0 </ixy>
		<ixz unit="SLUG*FT2">       0 </ixz>
		<iyz unit="SLUG*FT2">       0 </iyz>
		<emptywt unit="LBS" >   80431 </emptywt>

        <location unit="M" name="CG">
            <x>15.6957</x>
            <y>0</y>
            <z>0.19249</z>
        </location>

        <pointmass name="Crew">
			<weight unit="LBS">380</weight>
			<location name="POINTMASS" unit="M">
				<x>2.17105</x>
				<y> 0 </y>
				<z> -0.66384 </z>
			</location>
		</pointmass>

		<pointmass name="PAX">
			<weight unit="LBS">23000</weight>
			<location name="POINTMASS" unit="M">
				<x> 15.6957 </x>
				<y> 0 </y>
				<z> 0.19249 </z>
			</location>
		</pointmass>

		<pointmass name="Fwd Cargo">
			<weight unit="LBS">3000</weight>
			<location name="POINTMASS" unit="M">
				<x>9.9575</x>
				<y> 0 </y>
				<z> -1.18112 </z>
			</location>
		</pointmass>

		<pointmass name="Aft Cargo">
			<weight unit="LBS">3000</weight>
			<location name="POINTMASS" unit="M">
				<x> 21.4291 </x>
				<y> 0 </y>
				<z> -1.18112 </z>
			</location>
		</pointmass>
	</mass_balance>

	<ground_reactions>
		<contact type="BOGEY" name="NOSE_LG">
			<location unit="M">
				<x> 4.39645</x>
				<y> 0 </y>
				<z> -4.31395 </z>
			</location>
			<static_friction> 0.4 </static_friction>
			<dynamic_friction> 0.6 </dynamic_friction>
			<rolling_friction> 0.02 </rolling_friction>
			<spring_coeff unit="LBS/FT"> 30935.5 </spring_coeff>
			<damping_coeff unit="LBS/FT/SEC"> 16978.5 </damping_coeff>
			<max_steer unit="DEG"> 70 </max_steer>
			<brake_group> NOSE </brake_group>
			<retractable>1</retractable>
		</contact>
		<contact type="BOGEY" name="LEFT_MLG">
			<location unit="M">
				<x> 17.1906 </x>
				<y> -4.25855 </y>
				<z> -4.51844 </z>
			</location>
			<static_friction> 0.4 </static_friction>
			<dynamic_friction> 0.6 </dynamic_friction>
			<rolling_friction> 0.02 </rolling_friction>
			<spring_coeff unit="LBS/FT"> 59785 </spring_coeff>
			<damping_coeff unit="LBS/FT/SEC"> 23957 </damping_coeff>
			<max_steer unit="DEG"> 0.0 </max_steer>
			<brake_group> LEFT </brake_group>
			<retractable>1</retractable>
		</contact>
		<contact type="BOGEY" name="RIGHT_MLG">
			<location unit="M">
				<x> 17.1906 </x>
				<y> 4.25855 </y>
				<z> -4.51844 </z>
			</location>
			<static_friction> 0.4 </static_friction>
			<dynamic_friction> 0.6 </dynamic_friction>
			<rolling_friction> 0.02 </rolling_friction>
			<spring_coeff unit="LBS/FT"> 59785 </spring_coeff>
			<damping_coeff unit="LBS/FT/SEC"> 23957 </damping_coeff>
			<max_steer unit="DEG"> 0.0 </max_steer>
			<brake_group> RIGHT </brake_group>
			<retractable>1</retractable>
		</contact>

		<contact type="STRUCTURE" name="NOSE_1">
			<location unit="M">
				<x> 2.6272 </x>
				<y> 0 </y>
				<z> -1.10572 </z>
			</location>
			<static_friction> 1.0 </static_friction>
			<dynamic_friction> 0.4 </dynamic_friction>
			<rolling_friction> 0.4 </rolling_friction>
			<spring_coeff unit="LBS/FT"> 50000 </spring_coeff>
			<damping_coeff unit="LBS/FT/SEC"> 50000 </damping_coeff>
			<max_steer unit="DEG"> 0.0 </max_steer>
			<brake_group> NONE </brake_group>
			<retractable>0</retractable>
		</contact>
		<contact type="STRUCTURE" name="NOSE_2">
			<location unit="M">
				<x> 5.0858 </x>
				<y> 0 </y>
				<z> 1.34919 </z>
			</location>
			<static_friction> 1.0 </static_friction>
			<dynamic_friction> 0.4 </dynamic_friction>
			<rolling_friction> 0.4 </rolling_friction>
			<spring_coeff unit="LBS/FT"> 50000 </spring_coeff>
			<damping_coeff unit="LBS/FT/SEC"> 50000 </damping_coeff>
			<max_steer unit="DEG"> 0.0 </max_steer>
			<brake_group> NONE </brake_group>
			<retractable>0</retractable>
		</contact>

		<contact type="STRUCTURE" name="BOTTOM_1">
			<location unit="M">
				<x> 6.84944 </x>
				<y> 0 </y>
				<z> -2.11157 </z>
			</location>
			<static_friction> 1.0 </static_friction>
			<dynamic_friction> 0.4 </dynamic_friction>
			<rolling_friction> 0.4 </rolling_friction>
			<spring_coeff unit="LBS/FT"> 50000 </spring_coeff>
			<damping_coeff unit="LBS/FT/SEC"> 50000 </damping_coeff>
			<max_steer unit="DEG"> 0.0 </max_steer>
			<brake_group> NONE </brake_group>
			<retractable>0</retractable>
		</contact>
		<contact type="STRUCTURE" name="BOTTOM_2">
			<location unit="M">
				<x> 27.7516 </x>
				<y> 0 </y>
				<z> -2.10594 </z>
			</location>
			<static_friction> 1.0 </static_friction>
			<dynamic_friction> 0.4 </dynamic_friction>
			<rolling_friction> 0.4 </rolling_friction>
			<spring_coeff unit="LBS/FT"> 50000 </spring_coeff>
			<damping_coeff unit="LBS/FT/SEC"> 50000 </damping_coeff>
			<max_steer unit="DEG"> 0.0 </max_steer>
			<brake_group> NONE </brake_group>
			<retractable>0</retractable>
		</contact>

		<contact type="STRUCTURE" name="TOP_1">
			<location unit="M">
				<x> 8.9842 </x>
				<y> 0 </y>
				<z> 2.00377 </z>
			</location>
			<static_friction> 1.0 </static_friction>
			<dynamic_friction> 0.4 </dynamic_friction>
			<rolling_friction> 0.4 </rolling_friction>
			<spring_coeff unit="LBS/FT"> 50000 </spring_coeff>
			<damping_coeff unit="LBS/FT/SEC"> 50000 </damping_coeff>
			<max_steer unit="DEG"> 0.0 </max_steer>
			<brake_group> NONE </brake_group>
			<retractable>0</retractable>
		</contact>
		<contact type="STRUCTURE" name="TOP_2">
			<location unit="M">
				<x> 30.4145 </x>
				<y> 0 </y>
				<z> 1.98661 </z>
			</location>
			<static_friction> 1.0 </static_friction>
			<dynamic_friction> 0.4 </dynamic_friction>
			<rolling_friction> 0.4 </rolling_friction>
			<spring_coeff unit="LBS/FT"> 50000 </spring_coeff>
			<damping_coeff unit="LBS/FT/SEC"> 50000 </damping_coeff>
			<max_steer unit="DEG"> 0.0 </max_steer>
			<brake_group> NONE </brake_group>
			<retractable>0</retractable>
		</contact>

		<contact type="STRUCTURE" name="ENG_1">
			<location unit="M">
				<x> 14.3962788 </x>
				<y> -5.755 </y>
				<z> -3.1750887 </z>
			</location>
			<static_friction> 1.0 </static_friction>
			<dynamic_friction> 0.4 </dynamic_friction>
			<rolling_friction> 0.4 </rolling_friction>
			<spring_coeff unit="LBS/FT"> 50000 </spring_coeff>
			<damping_coeff unit="LBS/FT/SEC"> 50000 </damping_coeff>
			<max_steer unit="DEG"> 0.0 </max_steer>
			<brake_group> NONE </brake_group>
			<retractable>0</retractable>
		</contact>
		<contact type="STRUCTURE" name="ENG_2">
			<location unit="M">
				<x> 14.3962788 </x>
				<y> 5.755 </y>
				<z> -3.1750887 </z>
			</location>
			<static_friction> 1.0 </static_friction>
			<dynamic_friction> 0.4 </dynamic_friction>
			<rolling_friction> 0.4 </rolling_friction>
			<spring_coeff unit="LBS/FT"> 50000 </spring_coeff>
			<damping_coeff unit="LBS/FT/SEC"> 50000 </damping_coeff>
			<max_steer unit="DEG"> 0.0 </max_steer>
			<brake_group> NONE </brake_group>
			<retractable>0</retractable>
		</contact>

		<contact type="STRUCTURE" name="TAIL_1">
			<location unit="M">
				<x> 40.0923 </x>
				<y> 0 </y>
				<z> 0.85936 </z>
			</location>
			<static_friction> 1.0 </static_friction>
			<dynamic_friction> 0.4 </dynamic_friction>
			<rolling_friction> 0.4 </rolling_friction>
			<spring_coeff unit="LBS/FT"> 50000 </spring_coeff>
			<damping_coeff unit="LBS/FT/SEC"> 50000 </damping_coeff>
			<max_steer unit="DEG"> 0.0 </max_steer>
			<brake_group> NONE </brake_group>
			<retractable>0</retractable>
		</contact>
		<contact type="STRUCTURE" name="TAIL_2">
			<location unit="M">
				<x> 38.543 </x>
				<y> 0 </y>
				<z> 7.84126 </z>
			</location>
			<static_friction> 1.0 </static_friction>
			<dynamic_friction> 0.4 </dynamic_friction>
			<rolling_friction> 0.4 </rolling_friction>
			<spring_coeff unit="LBS/FT"> 50000 </spring_coeff>
			<damping_coeff unit="LBS/FT/SEC"> 50000 </damping_coeff>
			<max_steer unit="DEG"> 0.0 </max_steer>
			<brake_group> NONE </brake_group>
			<retractable>0</retractable>
		</contact>

		<contact type="STRUCTURE" name="WING_TIP_1">
			<location unit="M">
				<x> 23.7872 </x>
				<y> -16.9102 </y>
				<z> 0.22943 </z>
			</location>
			<static_friction> 1.0 </static_friction>
			<dynamic_friction> 0.4 </dynamic_friction>
			<rolling_friction> 0.4 </rolling_friction>
			<spring_coeff unit="LBS/FT"> 50000 </spring_coeff>
			<damping_coeff unit="LBS/FT/SEC"> 50000 </damping_coeff>
			<max_steer unit="DEG"> 0.0 </max_steer>
			<brake_group> NONE </brake_group>
			<retractable>0</retractable>
		</contact>
		<contact type="STRUCTURE" name="WING_TIP_2">
			<location unit="M">
				<x> 23.7872 </x>
				<y> 16.9102 </y>
				<z> 0.22943 </z>
			</location>
			<static_friction> 1.0 </static_friction>
			<dynamic_friction> 1 </dynamic_friction>
			<rolling_friction> 1 </rolling_friction>
			<spring_coeff unit="LBS/FT"> 50000 </spring_coeff>
			<damping_coeff unit="LBS/FT/SEC"> 50000 </damping_coeff>
			<max_steer unit="DEG"> 0.0 </max_steer>
			<brake_group> NONE </brake_group>
			<retractable>0</retractable>
		</contact>
	</ground_reactions>

	<propulsion>
		<engine file="cfm56_5b4">
			<location unit="M">
				<x> 11.2688788 </x>
				<y> -5.755 </y>
				<z> -1.04768 </z>
			</location>
			<orient unit="DEG">
				<roll> 0.0 </roll>
				<pitch> 2.2 </pitch>
				<yaw> 1 </yaw>
			</orient>
			<feed>3</feed>
			<thruster file="direct">
				<location unit="M">
					<x> 11.2688788 </x>
					<y> -5.755 </y>
					<z> -1.04768 </z>
				</location>
				<orient unit="DEG">
					<roll> 0.0 </roll>
					<pitch> 2.2 </pitch>
					<yaw> 1 </yaw>
				</orient>
			</thruster>
		</engine>

		<engine file="cfm56_5b4">
			<location unit="M">
				<x> 11.2688788 </x>
				<y> 5.755 </y>
				<z> -1.04768 </z>
			</location>
			<orient unit="DEG">
				<roll> 0.0 </roll>
				<pitch> 2.2 </pitch>
				<yaw> -1 </yaw>
			</orient>
			<feed>4</feed>
			<thruster file="direct">
				<location unit="M">
					<x> 11.2688788 </x>
					<y> 5.755 </y>
					<z> -1.04768 </z>
				</location>
				<orient unit="DEG">
					<roll> 0.0 </roll>
					<pitch> 2.2 </pitch>
					<yaw> -1 </yaw>
				</orient>
			</thruster>
		</engine>

		<tank type="FUEL">    <!-- Left Wing Tank -->
			<location unit="M">
				<x> 18.9231 </x>
				<y> -5.1104 </y>
				<z> -0.61182 </z>
			</location>
			<capacity unit="LBS"> 13914 </capacity>
			<contents unit="LBS"> 6000 </contents>
			<standpipe unit="LBS">31</standpipe>
			<priority>1</priority>
			<type>JET-A1</type>
			<temperature>50</temperature>
		</tank>
		<tank type="FUEL">    <!-- Center Tank -->
			<location unit="M">
				<x> 15.8457 </x>
				<y> 0 </y>
				<z> -0.61182 </z>
			</location>
			<capacity unit="LBS"> 14281 </capacity>
			<contents unit="LBS"> 0 </contents>
			<standpipe unit="LBS">43</standpipe>
			<priority>1</priority>
			<type>JET-A1</type>
			<temperature>50</temperature>
		</tank>
		<tank type="FUEL">    <!-- Right Wing Tank -->
			<location unit="M">
				<x> 15.7957</x>
				<y> 5.1104 </y>
				<z> -0.61182 </z>
			</location>
			<capacity unit="LBS"> 13914 </capacity>
			<contents unit="LBS"> 6000 </contents>
			<standpipe unit="LBS">31</standpipe>
			<priority>1</priority>
			<type>JET-A1</type>
			<temperature>50</temperature>
		</tank>
		<tank type="FUEL">    <!-- Engine 1 Pipes -->
			<location unit="M">
				<x> 15.6957 </x>
				<y> 0 </y>
				<z> 0.19249 </z>
			</location>
			<capacity unit="LBS">10</capacity>
			<contents unit="LBS">0</contents>
			<priority>1</priority>
			<type>JET-A1</type>
		</tank>
		<tank type="FUEL">    <!-- Engine 2 Pipes -->
			<location unit="M">
				<x> 15.6957 </x>
				<y> 0 </y>
				<z> 0.19249 </z>
			</location>
			<capacity unit="LBS">10</capacity>
			<contents unit="LBS">0</contents>
			<priority>1</priority>
			<type>JET-A1</type>
		</tank>
	</propulsion>

	<system file="pushback" />
	<system file="fuel" />
	<system file="glass-effect1" />
	<system file="fmgc" />
	<system file="a320-fcs" />

    <flight_control name="A320-200-FCS">
        <channel name="extra-aero">
            <!-- need %Cg in chord for moments [Xcg - Xref)/100] -->
            <summer name="cg-x-offset-chord-in">
                <input> inertia/cg-x-in</input>
                <input> -metrics/aero-rp-x-in</input>
                <output>inertia/cg-x-offset-chord-in</output>
            </summer>

            <!-- figure out the factor for the fuel tank aero -->
            <pure_gain name="cg-x-chord-percent">
                <description>Percent offset of the CoP from the CG</description>
                <input>inertia/cg-x-offset-chord-in</input>
                <gain> -0.01</gain>
                <clipto>
                    <min> -1 </min>
                    <max> 1 </max>
                </clipto>
                <output> inertia/cg-x-mac-percent </output>
            </pure_gain>

            <fcs_function name="pb">
                <description>PB Denormalization</description>
                <function>
                    <quotient>
                        <product>
                            <property>metrics/bw-ft</property>
                            <property>velocities/p-aero-rad_sec</property>
                        </product>
                        <!-- over -->
                        <product>
                            <value>2</value>
                            <property>velocities/vt-fps</property>
                        </product>
                    </quotient>
                </function>
                <clipto>
                    <min> -1.00 </min>
                    <max>  1.00 </max>
                </clipto>
                <output>aero/pb</output>
            </fcs_function>

            <fcs_function name="cbarq-2vo">
                <description>For denormalization</description>
                <function>
                    <quotient>
                        <product>
                            <property>metrics/cbarw-ft</property>
                            <property>velocities/q-aero-rad_sec</property>
                        </product>
                        <!-- over -->
                        <product>
                            <value>2</value>
                            <property>velocities/vt-fps</property>
                        </product>
                    </quotient>
                </function>
                <clipto>
                    <min> -2.01 </min>
                    <max>  2.01 </max>
                </clipto>
                <output>aero/qb</output>
            </fcs_function>

            <fcs_function name="rb-2vo">
                <description>For denormalization</description>
                <function>
                    <quotient>
                        <product>
                            <property>metrics/bw-ft</property>
                            <property>velocities/r-aero-rad_sec</property>
                        </product>
                        <!-- over -->
                        <product>
                            <value>2</value>
                            <property>velocities/vt-fps</property>
                        </product>
                    </quotient>
                </function>
                <clipto>
                    <min> -1.00 </min>
                    <max>  1.00 </max>
                </clipto>
                <output>aero/rb</output>
            </fcs_function>


            <fcs_function name="aero-cos-alpha">
                <function>
                    <product>
                        <cos>
                            <property>aero/alpha-rad</property>
                        </cos>
                    </product>
                </function>
                <output>aero/cos-alpha</output>
            </fcs_function>

            <fcs_function name="aero-sin-alpha">
                <function>
                    <product>
                        <sin>
                            <property>aero/alpha-rad</property>
                        </sin>
                    </product>
                </function>
                <output>aero/sin-alpha</output>
            </fcs_function>
        </channel>
    </flight_control>

    <aerodynamics file="Systems/a320-aerodynamics.xml" />

	<external_reactions>
		<force name="pushback" frame="BODY">
			<location unit="M">
				<x> 7.52385 </x>
				<y> 0 </y>
				<z> -3.2846 </z>
			</location>
			<direction>
				<x> 1 </x>
				<y> 0 </y>
				<z> 0 </z>
			</direction>
		</force>
	</external_reactions>
    <output name="c:/temp/JSBOut.csv" type="CSV" rate="10">
        <property>aero/alpha-deg</property>
        <property>aero/alphadot-rad_sec</property>
        <property>aero/beta-deg</property>
        <property>aero/betadot-rad_sec</property>
        <property>aero/c/CFXB</property>
        <property>aero/c/CFXDAD</property>
        <property>aero/c/CFXDFM</property>
        <property>aero/c/CFXDRD</property>
        <property>aero/c/CFXDSM</property>
        <property>aero/c/CFXDSPL</property>
        <property>aero/c/CFXDSPR</property>
        <property>aero/c/CFYB</property>
        <property>aero/c/CFYDFM</property>
        <property>aero/c/CFYDSM</property>
        <property>aero/c/CFYDSPL</property>
        <property>aero/c/CFYDSPR</property>
        <property>aero/c/CFYP</property>
        <property>aero/c/CFYR</property>
        <property>aero/c/CFZB</property>
        <property>aero/c/CFZDAD</property>
        <property>aero/c/CFZDFM</property>
        <property>aero/c/CFZDRD</property>
        <property>aero/c/CFZDSM</property>
        <property>aero/c/CFZDSPL</property>
        <property>aero/c/CFZDSPR</property>
        <property>aero/c/CML1</property>
        <property>aero/c/CMLBETADOT</property>
        <property>aero/c/CMLDAD</property>
        <property>aero/c/CMLDFM</property>
        <property>aero/c/CMLDRD</property>
        <property>aero/c/CMLDSM</property>
        <property>aero/c/CMLDSPL</property>
        <property>aero/c/CMLDSPR</property>
        <property>aero/c/CMLP</property>
        <property>aero/c/CMLR</property>
        <property>aero/c/CMM1</property>
        <property>aero/c/CMMALPHADOT</property>
        <property>aero/c/CMMBETADOT</property>
        <property>aero/c/CMMDAD</property>
        <property>aero/c/CMMDFM</property>
        <property>aero/c/CMMDRD</property>
        <property>aero/c/CMMDSM</property>
        <property>aero/c/CMMDSPL</property>
        <property>aero/c/CMMDSPR</property>
        <property>aero/c/CMMQ</property>
        <property>aero/c/CMN1</property>
        <property>aero/c/CMNBETADOT</property>
        <property>aero/c/CMNDAD</property>
        <property>aero/c/CMNDFM</property>
        <property>aero/c/CMNDRD</property>
        <property>aero/c/CMNDSM</property>
        <property>aero/c/CMNDSPL</property>
        <property>aero/c/CMNDSPR</property>
        <property>aero/c/CMNP</property>
        <property>aero/c/CMNR</property>
        <property>aero/c/CYDAD</property>
        <property>aero/c/CYDRD</property>
        <property>aero/coefficients/CDRAG</property>
        <property>aero/coefficients/CLIFT</property>
        <property>aero/coefficients/CPITCH</property>
        <property>aero/coefficients/CROLL</property>
        <property>aero/coefficients/CSIDE</property>
        <property>aero/coefficients/CYAW</property>
        <property>aero/pb</property>
        <property>aero/qb</property>
        <property>aero/rb</property>
        <property>fcs/flap-pos-deg</property>
        <property>fcs/pitch-pos-deg</property>
        <property>fcs/roll-pos-deg</property>
        <property>fcs/rudder-pos-deg</property>
        <property>fcs/slat-pos-deg</property>
        <property>fcs/speedbrake-left-deg</property>
        <property>fcs/speedbrake-right-deg</property>
    </output>
</fdm_config>
