    <aerodynamics>
    <fileheader>
        <author>Richard Harrison</author>
        <filecreationdate>2018-03-10</filecreationdate>
        <version>1.0</version>
        <copyright>Copyright (C) 2016 Richard Harrison, All rights reserved</copyright>
        <description></description>
        <note>
        A320-200
    </note>
        <note>Built with AeroTool 1.0.0.0: Options: AeroDetail=Full, Gear, Flaps, ExternalTanks, WakeIterations=4</note>
        <limitation></limitation>
        <reference
            refID="ZDAT/AED/2018/03-07"
            author="Richard Harrison, rjh@zaretto.com"
            title="A320 200 Aerodynamic data built from vspaero; CG (15.3, 0, 0)M"
            date="March 7, 2018"
            URL="http://www.zaretto.com/sites/zaretto.com/files/A320-200-data/rjh-zaretto-A320-200-aerodynamic-data-vspaero.pdf"
        />
    </fileheader>
    <function name="aero/c/CFXB">
    <description>BASE DRAG</description>
    <product>
          <table>
            <independentVar lookup="row">aero/alpha-deg</independentVar>
            <independentVar lookup="column">aero/beta-deg</independentVar>
            <tableData>
                                -20	        -10	         -5	         -2	          0	          2	          5	         10	         20
                    -10	    0.07432	    0.06229	    0.05934	    0.05895	    0.05892	    0.05895	    0.05934	    0.06229	    0.07432
                     -5	    0.05366	    0.03834	    0.03462	    0.03287	    0.03312	    0.03339	    0.03462	    0.03834	    0.05366
                     -2	    0.04995	    0.03332	    0.02823	    0.02705	    0.02684	    0.02715	    0.02823	    0.03332	    0.04995
                      0	    0.04852	    0.03246	    0.02757	    0.02629	    0.02606	    0.02629	    0.02757	    0.03246	    0.04852
                      1	    0.04907	    0.03303	    0.02817	    0.02684	    0.02662	    0.02684	    0.02817	    0.03303	    0.04907
                      2	    0.05045	    0.03464	    0.02949	    0.02803	    0.02784	    0.02803	    0.02949	    0.03622	    0.05077
                      3	    0.05223	    0.03671	    0.03143	    0.02973	    0.02971	    0.02973	    0.03143	    0.03671	    0.05223
                      4	    0.05488	    0.03951	    0.03455	    0.03245	    0.03233	    0.03245	    0.03455	    0.03951	    0.05488
                      5	    0.05900	    0.04298	    0.03773	    0.03620	    0.03566	    0.03587	    0.03773	    0.04290	    0.05900
                      6	    0.06396	    0.04626	    0.04180	    0.04021	    0.03989	    0.04021	    0.04184	    0.04626	    0.06396
                      7	    0.06610	    0.05620	    0.04701	    0.04488	    0.04470	    0.04488	    0.04701	    0.05706	    0.06610
                      8	    0.06968	    0.05954	    0.05366	    0.04999	    0.05045	    0.04999	    0.05366	    0.05953	    0.06968
                      9	    0.07309	    0.06685	    0.05989	    0.05708	    0.05656	    0.05678	    0.05989	    0.06685	    0.07309
                     10	    0.07724	    0.07251	    0.06695	    0.06453	    0.06396	    0.06453	    0.06695	    0.07251	    0.07724
                     11	    0.08528	    0.07920	    0.07381	    0.07283	    0.07213	    0.07283	    0.07381	    0.07920	    0.08528
                     12	    0.09230	    0.08713	    0.08344	    0.08124	    0.08074	    0.08124	    0.08344	    0.08713	    0.09192
                     13	    0.09943	    0.09594	    0.09093	    0.08959	    0.08926	    0.08959	    0.09095	    0.09594	    0.09943
                     14	    0.10683	    0.10442	    0.09846	    0.09782	    0.09751	    0.09782	    0.09846	    0.10442	    0.10745
                     15	    0.11494	    0.11331	    0.10635	    0.10577	    0.10544	    0.10577	    0.10635	    0.11331	    0.11494
                     16	    0.12276	    0.12090	    0.11410	    0.11315	    0.11291	    0.11313	    0.11410	    0.12090	    0.12276
                     17	    0.13275	    0.12876	    0.12197	    0.12056	    0.12031	    0.12056	    0.12197	    0.12876	    0.13275
                     18	    0.14165	    0.13572	    0.12849	    0.12762	    0.12754	    0.12762	    0.12849	    0.13572	    0.14165
                     19	    0.15086	    0.14168	    0.13552	    0.13475	    0.13455	    0.13475	    0.13552	    0.14168	    0.15086
                     20	    0.15908	    0.14660	    0.14298	    0.14159	    0.14139	    0.14159	    0.14295	    0.14715	    0.15908
                     22	    0.16568	    0.15628	    0.15594	    0.15489	    0.15460	    0.15487	    0.15594	    0.15578	    0.16568
                     24	    0.17676	    0.16420	    0.16826	    0.16726	    0.16696	    0.17173	    0.16826	    0.16500	    0.17428
                     25	    0.18221	    0.17510	    0.17369	    0.17262	    0.17228	    0.17262	    0.17369	    0.17510	    0.18221
                     28	    0.19583	    0.18994	    0.18693	    0.18693	    0.18695	    0.18693	    0.18618	    0.18994	    0.19583
                     30	    0.20396	    0.19970	    0.19602	    0.19677	    0.19645	    0.19677	    0.19602	    0.19970	    0.20396
                     35	    0.22511	    0.21845	    0.21560	    0.21602	    0.21605	    0.21602	    0.21559	    0.21845	    0.22511
                     45	    0.25189	    0.24304	    0.24258	    0.24329	    0.24372	    0.24329	    0.24258	    0.24354	    0.25232
                     50	    0.26276	    0.25237	    0.25313	    0.25398	    0.25438	    0.25398	    0.25313	    0.25273	    0.26277
                     55	    0.27072	    0.26291	    0.26302	    0.26375	    0.26413	    0.26375	    0.26302	    0.26414	    0.27072
                     60	    0.27756	    0.27150	    0.27138	    0.27243	    0.27293	    0.27243	    0.27138	    0.27150	    0.27756
            </tableData>
          </table>
       </product>
    </function>
    <function name="aero/c/CFXDAD">
    <description>DRAG INCREMENT DUE TO AILERON DEFLECTION</description>
    <product>
          <property>fcs/roll-pos-deg</property>
          <table>
            <independentVar lookup="row">aero/alpha-deg</independentVar>
            <independentVar lookup="column">aero/beta-deg</independentVar>
            <tableData>
                                -20	        -10	         -5	         -2	          0	          2	          5	         10	         20
                    -10	  -0.00012	  -0.00010	  -0.00009	  -0.00008	  -0.00008	  -0.00007	  -0.00007	  -0.00007	  -0.00005
                     -5	  -0.00016	  -0.00014	  -0.00014	  -0.00016	  -0.00013	  -0.00013	  -0.00013	  -0.00013	  -0.00010
                     -2	  -0.00017	  -0.00016	  -0.00015	  -0.00015	  -0.00014	  -0.00013	  -0.00013	  -0.00012	  -0.00009
                      0	  -0.00018	  -0.00016	  -0.00015	  -0.00014	  -0.00014	  -0.00014	  -0.00013	  -0.00012	  -0.00008
                      1	  -0.00018	  -0.00016	  -0.00016	  -0.00015	  -0.00014	  -0.00013	  -0.00013	  -0.00011	  -0.00008
                      2	  -0.00017	  -0.00015	  -0.00015	  -0.00015	  -0.00014	  -0.00013	  -0.00013	  -0.00004	  -0.00006
                      3	  -0.00017	  -0.00016	  -0.00015	  -0.00015	  -0.00014	  -0.00013	  -0.00013	  -0.00011	  -0.00007
                      4	  -0.00016	  -0.00015	  -0.00014	  -0.00014	  -0.00013	  -0.00013	  -0.00012	  -0.00011	  -0.00007
                      5	  -0.00015	  -0.00014	  -0.00014	  -0.00012	  -0.00012	  -0.00012	  -0.00011	  -0.00011	  -0.00006
                      6	  -0.00014	  -0.00014	  -0.00013	  -0.00026	  -0.00012	  -0.00011	  -0.00011	  -0.00009	  -0.00007
                      7	  -0.00014	  -0.00017	  -0.00018	  -0.00011	  -0.00010	  -0.00010	  -0.00009	  -0.00005	  -0.00006
                      8	  -0.00013	  -0.00011	  -0.00011	  -0.00010	  -0.00008	  -0.00009	  -0.00009	  -0.00009	  -0.00005
                      9	  -0.00011	  -0.00015	  -0.00010	  -0.00008	  -0.00008	  -0.00008	  -0.00007	  -0.00004	  -0.00005
                     10	  -0.00010	  -0.00009	  -0.00006	  -0.00007	  -0.00007	  -0.00006	  -0.00005	    0.00003	  -0.00004
                     11	  -0.00008	  -0.00005	  -0.00006	  -0.00005	  -0.00004	  -0.00004	  -0.00004	  -0.00005	  -0.00005
                     12	  -0.00005	  -0.00005	  -0.00004	  -0.00004	  -0.00004	  -0.00004	  -0.00004	  -0.00004	  -0.00005
                     13	  -0.00004	  -0.00003	  -0.00004	  -0.00003	  -0.00003	  -0.00003	  -0.00002	  -0.00003	  -0.00004
                     14	  -0.00031	    0.00000	  -0.00003	  -0.00003	  -0.00002	  -0.00002	  -0.00002	  -0.00001	  -0.00003
                     15	  -0.00001	  -0.00003	  -0.00002	  -0.00002	  -0.00002	  -0.00002	  -0.00001	  -0.00001	  -0.00004
                     16	   0.00000	  -0.00002	  -0.00001	  -0.00002	  -0.00001	  -0.00001	  -0.00001	  -0.00001	  -0.00006
                     17	    0.00000	  -0.00002	  -0.00002	  -0.00001	  -0.00001	  -0.00001	   0.00000	   0.00000	  -0.00003
                     18	   0.00000	  -0.00002	  -0.00001	  -0.00001	   0.00000	  -0.00001	   0.00000	    0.00003	  -0.00002
                     19	    0.00000	  -0.00001	  -0.00001	  -0.00019	  -0.00001	  -0.00001	    0.00000	   0.00000	  -0.00060
                     20	    0.00000	  -0.00002	  -0.00001	  -0.00001	  -0.00001	   0.00000	   0.00000	    0.00001	  -0.00001
                     22	   0.00000	  -0.00001	  -0.00051	  -0.00001	  -0.00001	   0.00000	   0.00000	  -0.00002	  -0.00001
                     24	    0.00000	  -0.00003	  -0.00001	  -0.00001	  -0.00001	    0.00018	   0.00000	   0.00000	  -0.00011
                     25	    0.00001	  -0.00001	   0.00000	  -0.00001	  -0.00001	   0.00000	   0.00000	   0.00000	  -0.00001
                     28	   0.00000	   0.00000	   0.00000	   0.00000	   0.00000	   0.00000	  -0.00003	    0.00000	    0.00000
                     30	   0.00000	   0.00000	    0.00000	    0.00003	   0.00000	   0.00000	   0.00000	    0.00000	    0.00000
                     35	    0.00000	    0.00000	    0.00000	    0.00000	    0.00000	    0.00000	    0.00000	    0.00001	    0.00001
                     45	  -0.00001	    0.00001	    0.00001	    0.00001	    0.00001	    0.00001	    0.00001	    0.00003	    0.00009
                     50	    0.00000	    0.00001	    0.00001	    0.00001	    0.00001	    0.00001	    0.00001	    0.00003	    0.00003
                     55	    0.00000	    0.00001	    0.00001	    0.00001	    0.00001	    0.00060	    0.00002	    0.00007	    0.00003
                     60	    0.00000	    0.00001	    0.00001	    0.00002	    0.00002	    0.00002	    0.00002	    0.00002	    0.00003
            </tableData>
          </table>
       </product>
    </function>
    <function name="aero/c/CFXDFM">
    <description>DRAG INCREMENT DUE TO FLAPS</description>
    <product>
          <property>fcs/flap-pos-deg</property>
          <table>
            <independentVar lookup="row">aero/alpha-deg</independentVar>
            <independentVar lookup="column">aero/beta-deg</independentVar>
            <tableData>
                                -20	        -10	         -5	         -2	          0	          2	          5	         10	         20
                    -10	  -0.01975	  -0.01791	  -0.01907	  -0.01885	  -0.01903	  -0.01885	  -0.01907	  -0.01791	  -0.01975
                     -5	  -0.00252	  -0.00040	  -0.00037	    0.00021	  -0.00018	  -0.00031	  -0.00037	  -0.00040	  -0.00252
                     -2	    0.00915	    0.01159	    0.01352	    0.01317	    0.01270	    0.01307	    0.01352	    0.01159	    0.00915
                      0	    0.01856	    0.02140	    0.02270	    0.02248	    0.02220	    0.02248	    0.02270	    0.02140	    0.01856
                      1	    0.02331	    0.02662	    0.02784	    0.02750	    0.02718	    0.02750	    0.02784	    0.02662	    0.02331
                      2	    0.02830	    0.03160	    0.03287	    0.03265	    0.03227	    0.03265	    0.03287	    0.03002	    0.02798
                      3	    0.03385	    0.03724	    0.03855	    0.03799	    0.03744	    0.03799	    0.03855	    0.03724	    0.03385
                      4	    0.03829	    0.04377	    0.04469	    0.04334	    0.04274	    0.04334	    0.04469	    0.04377	    0.03829
                      5	    0.04101	    0.05151	    0.04941	    0.04821	    0.04808	    0.04854	    0.04941	    0.05159	    0.04101
                      6	    0.04795	    0.06018	    0.05654	    0.05490	    0.05434	    0.05490	    0.05650	    0.06018	    0.04795
                      7	    0.05198	    0.05402	    0.06049	    0.05955	    0.05905	    0.05955	    0.06049	    0.05316	    0.05198
                      8	    0.05245	    0.06123	    0.06044	    0.06379	    0.06109	    0.06379	    0.06044	    0.06124	    0.05245
                      9	    0.05311	    0.06042	    0.06477	    0.06656	    0.06302	    0.06686	    0.06477	    0.06042	    0.05311
                     10	    0.06191	    0.06192	    0.06706	    0.06652	    0.06473	    0.06652	    0.06706	    0.06192	    0.06191
                     11	    0.06133	    0.06313	    0.06788	    0.06587	    0.06688	    0.06587	    0.06788	    0.06313	    0.06133
                     12	    0.06286	    0.06600	    0.07127	    0.06824	    0.06741	    0.06824	    0.07127	    0.06600	    0.06324
                     13	    0.06488	    0.06699	    0.06879	    0.06765	    0.06750	    0.06765	    0.06877	    0.06699	    0.06488
                     14	    0.06646	    0.06855	    0.06603	    0.06666	    0.06688	    0.06666	    0.06603	    0.06855	    0.06584
                     15	    0.06552	    0.06704	    0.06440	    0.06628	    0.06688	    0.06628	    0.06440	    0.06704	    0.06552
                     16	    0.06634	    0.06624	    0.06590	    0.06645	    0.06605	    0.06647	    0.06590	    0.06624	    0.06634
                     17	    0.06380	    0.06596	    0.06524	    0.06665	    0.06511	    0.06665	    0.06524	    0.06596	    0.06380
                     18	    0.06182	    0.06552	    0.06506	    0.06690	    0.06438	    0.06690	    0.06506	    0.06552	    0.06182
                     19	    0.06020	    0.06660	    0.06441	    0.06718	    0.06550	    0.06718	    0.06441	    0.06660	    0.06020
                     20	    0.05888	    0.06542	    0.06441	    0.06695	    0.06635	    0.06695	    0.06444	    0.06487	    0.05888
                     22	    0.06194	    0.06697	    0.06745	    0.06783	    0.06812	    0.06785	    0.06745	    0.06747	    0.06194
                     24	    0.06526	    0.06965	    0.07032	    0.07008	    0.06980	    0.06561	    0.07032	    0.06885	    0.06774
                     25	    0.06714	    0.07099	    0.07281	    0.07235	    0.07263	    0.07235	    0.07281	    0.07099	    0.06714
                     28	    0.07324	    0.07926	    0.07891	    0.07962	    0.07956	    0.07962	    0.07966	    0.07926	    0.07324
                     30	    0.07796	    0.08249	    0.08134	    0.08121	    0.08140	    0.08121	    0.08134	    0.08249	    0.07796
                     35	    0.08198	    0.08177	    0.08265	    0.08287	    0.08297	    0.08287	    0.08266	    0.08177	    0.08198
                     45	    0.09280	    0.09136	    0.08865	    0.08814	    0.08794	    0.08814	    0.08865	    0.09086	    0.09237
                     50	    0.09867	    0.10269	    0.10524	    0.09806	    0.09727	    0.09806	    0.10524	    0.10233	    0.09866
                     55	    0.11236	    0.12285	    0.13095	    0.12082	    0.11742	    0.12082	    0.13095	    0.12162	    0.11236
                     60	    0.13452	    0.14567	    0.14563	    0.14332	    0.14257	    0.14332	    0.14563	    0.14567	    0.13452
            </tableData>
          </table>
       </product>
    </function>
    <function name="aero/c/CFXDRD">
    <description>DRAG INCREMENT DUE TO RUDDER DEFLECTION</description>
    <product>
          <property>fcs/rudder-pos-deg</property>
          <table>
            <independentVar lookup="row">aero/alpha-deg</independentVar>
            <independentVar lookup="column">aero/beta-deg</independentVar>
            <tableData>
                                -20	        -10	         -5	         -2	          0	          2	          5	         10	         20
                    -10	  -0.00063	  -0.00082	  -0.00070	  -0.00044	  -0.00026	  -0.00053	  -0.00018	    0.00009	    0.00057
                     -5	  -0.00068	  -0.00082	  -0.00067	  -0.00062	  -0.00051	  -0.00033	  -0.00013	    0.00013	    0.00061
                     -2	  -0.00070	  -0.00075	  -0.00061	  -0.00047	  -0.00033	  -0.00027	  -0.00010	    0.00019	    0.00064
                      0	  -0.00070	  -0.00072	  -0.00053	  -0.00042	  -0.00034	  -0.00022	  -0.00008	    0.00020	    0.00065
                      1	  -0.00072	  -0.00071	  -0.00051	  -0.00039	  -0.00023	  -0.00019	  -0.00006	    0.00021	    0.00066
                      2	  -0.00072	  -0.00072	  -0.00049	  -0.00034	  -0.00022	  -0.00017	  -0.00005	    0.00030	    0.00068
                      3	  -0.00071	  -0.00070	  -0.00047	  -0.00029	  -0.00020	  -0.00020	  -0.00003	    0.00024	    0.00068
                      4	  -0.00071	  -0.00072	  -0.00049	  -0.00030	  -0.00023	  -0.00017	    0.00000	    0.00025	    0.00068
                      5	  -0.00070	  -0.00072	  -0.00044	  -0.00025	  -0.00022	  -0.00015	   0.00000	    0.00026	    0.00070
                      6	  -0.00069	  -0.00066	  -0.00040	  -0.00032	  -0.00019	  -0.00009	    0.00002	    0.00024	    0.00072
                      7	  -0.00067	  -0.00076	  -0.00039	  -0.00032	  -0.00019	  -0.00033	    0.00002	    0.00044	    0.00068
                      8	  -0.00069	  -0.00070	  -0.00044	  -0.00023	  -0.00014	  -0.00010	    0.00010	    0.00034	    0.00068
                      9	  -0.00067	  -0.00077	  -0.00047	  -0.00020	  -0.00011	  -0.00010	    0.00008	    0.00040	    0.00062
                     10	  -0.00061	  -0.00073	  -0.00057	  -0.00030	    0.00002	  -0.00009	    0.00010	    0.00029	    0.00059
                     11	  -0.00062	  -0.00075	  -0.00033	  -0.00035	  -0.00046	  -0.00012	    0.00004	    0.00031	    0.00060
                     12	  -0.00060	  -0.00080	  -0.00049	  -0.00041	  -0.00040	  -0.00012	    0.00010	    0.00031	    0.00060
                     13	  -0.00063	  -0.00076	  -0.00054	  -0.00049	  -0.00025	  -0.00011	    0.00008	    0.00035	    0.00062
                     14	  -0.00063	  -0.00104	  -0.00050	  -0.00032	  -0.00019	  -0.00010	    0.00005	    0.00039	    0.00062
                     15	  -0.00057	  -0.00076	  -0.00045	  -0.00028	  -0.00009	  -0.00007	    0.00006	    0.00045	    0.00061
                     16	  -0.00065	  -0.00074	  -0.00046	  -0.00028	  -0.00009	  -0.00009	    0.00008	    0.00044	    0.00068
                     17	  -0.00065	  -0.00074	  -0.00046	  -0.00029	  -0.00018	  -0.00012	    0.00009	    0.00046	    0.00065
                     18	  -0.00068	  -0.00072	  -0.00041	  -0.00028	  -0.00019	  -0.00012	    0.00005	    0.00045	    0.00070
                     19	  -0.00072	  -0.00066	  -0.00040	  -0.00028	  -0.00018	  -0.00012	    0.00005	    0.00041	    0.00074
                     20	  -0.00075	  -0.00025	  -0.00045	  -0.00028	  -0.00012	  -0.00010	    0.00012	    0.00034	    0.00075
                     22	  -0.00066	  -0.00048	  -0.00038	  -0.00025	  -0.00019	  -0.00007	    0.00013	    0.00025	    0.00063
                     24	  -0.00067	  -0.00036	  -0.00028	  -0.00020	  -0.00013	    0.00015	    0.00014	    0.00018	    0.00053
                     25	  -0.00066	  -0.00045	  -0.00026	  -0.00019	  -0.00013	  -0.00003	    0.00013	    0.00032	    0.00063
                     28	  -0.00052	  -0.00044	  -0.00020	  -0.00012	  -0.00005	  -0.00002	    0.00002	    0.00030	    0.00053
                     30	  -0.00045	  -0.00045	  -0.00017	  -0.00005	  -0.00001	   0.00000	    0.00003	    0.00034	    0.00046
                     35	  -0.00037	  -0.00026	  -0.00011	  -0.00009	  -0.00006	  -0.00005	    0.00001	    0.00024	    0.00040
                     45	  -0.00021	  -0.00007	  -0.00001	    0.00002	    0.00001	  -0.00002	  -0.00001	    0.00009	    0.00025
                     50	  -0.00009	  -0.00002	    0.00000	    0.00002	   0.00000	  -0.00002	  -0.00001	    0.00004	    0.00018
                     55	  -0.00003	  -0.00002	    0.00000	    0.00000	   0.00000	   0.00000	   0.00000	    0.00008	    0.00012
                     60	    0.00003	    0.00000	    0.00000	    0.00000	   0.00000	   0.00000	   0.00000	    0.00001	    0.00006
            </tableData>
          </table>
       </product>
    </function>
    <function name="aero/c/CFXDSM">
    <description>DRAG INCREMENT DUE TO SLATS</description>
    <product>
          <property>fcs/slat-pos-deg</property>
          <table>
            <independentVar lookup="row">aero/alpha-deg</independentVar>
            <independentVar lookup="column">aero/beta-deg</independentVar>
            <tableData>
                                -20	        -10	         -5	         -2	          0	          2	          5	         10	         20
                    -10	  -0.01461	  -0.01347	  -0.01368	  -0.01374	  -0.01378	  -0.01374	  -0.01368	  -0.01347	  -0.01461
                     -5	  -0.00483	  -0.00112	  -0.00292	  -0.00239	  -0.00289	  -0.00291	  -0.00292	  -0.00112	  -0.00483
                     -2	    0.00093	    0.00359	    0.00510	    0.00502	    0.00489	    0.00492	    0.00510	    0.00359	    0.00093
                      0	    0.00876	    0.01062	    0.01097	    0.01107	    0.01103	    0.01107	    0.01097	    0.01062	    0.00876
                      1	    0.01260	    0.01425	    0.01441	    0.01446	    0.01441	    0.01446	    0.01441	    0.01425	    0.01260
                      2	    0.01624	    0.01744	    0.01800	    0.01801	    0.01793	    0.01801	    0.01800	    0.01586	    0.01592
                      3	    0.02016	    0.02129	    0.02153	    0.02150	    0.02153	    0.02150	    0.02153	    0.02129	    0.02016
                      4	    0.02601	    0.02519	    0.02685	    0.02538	    0.02526	    0.02538	    0.02685	    0.02519	    0.02601
                      5	    0.03348	    0.02702	    0.02926	    0.02893	    0.02919	    0.02926	    0.02926	    0.02710	    0.03348
                      6	    0.03605	    0.03448	    0.03622	    0.03314	    0.03301	    0.03314	    0.03618	    0.03448	    0.03605
                      7	    0.03294	    0.03310	    0.03735	    0.03718	    0.03719	    0.03718	    0.03735	    0.03224	    0.03294
                      8	    0.03675	    0.03855	    0.04002	    0.04218	    0.04110	    0.04218	    0.04002	    0.03856	    0.03675
                      9	    0.03767	    0.04097	    0.04445	    0.04518	    0.04442	    0.04548	    0.04445	    0.04097	    0.03767
                     10	    0.04116	    0.04425	    0.04771	    0.04746	    0.04816	    0.04746	    0.04771	    0.04425	    0.04116
                     11	    0.04182	    0.04819	    0.05053	    0.05000	    0.04873	    0.05000	    0.05053	    0.04819	    0.04182
                     12	    0.04355	    0.05000	    0.04941	    0.05068	    0.04975	    0.05068	    0.04941	    0.05000	    0.04393
                     13	    0.04585	    0.05039	    0.05028	    0.05093	    0.05040	    0.05093	    0.05026	    0.05039	    0.04585
                     14	    0.04811	    0.05131	    0.05049	    0.05116	    0.05059	    0.05116	    0.05049	    0.05131	    0.04749
                     15	    0.04965	    0.05150	    0.05098	    0.05111	    0.05080	    0.05111	    0.05098	    0.05150	    0.04965
                     16	    0.05332	    0.05110	    0.05033	    0.05076	    0.05034	    0.05078	    0.05033	    0.05110	    0.05332
                     17	    0.05477	    0.05067	    0.05031	    0.05040	    0.05070	    0.05040	    0.05031	    0.05067	    0.05477
                     18	    0.05598	    0.05013	    0.05043	    0.05054	    0.05039	    0.05054	    0.05043	    0.05013	    0.05598
                     19	    0.05467	    0.05083	    0.05131	    0.05071	    0.05083	    0.05071	    0.05131	    0.05083	    0.05467
                     20	    0.04885	    0.05177	    0.05141	    0.05119	    0.05140	    0.05119	    0.05144	    0.05122	    0.04885
                     22	    0.05286	    0.05376	    0.05362	    0.05327	    0.05318	    0.05329	    0.05362	    0.05426	    0.05286
                     24	    0.05553	    0.05806	    0.05623	    0.05645	    0.05633	    0.05198	    0.05623	    0.05726	    0.05801
                     25	    0.05720	    0.05853	    0.05883	    0.05860	    0.05882	    0.05860	    0.05883	    0.05853	    0.05720
                     28	    0.06218	    0.06542	    0.06624	    0.06546	    0.06553	    0.06546	    0.06699	    0.06542	    0.06218
                     30	    0.06666	    0.06854	    0.06927	    0.06896	    0.06866	    0.06896	    0.06927	    0.06854	    0.06666
                     35	    0.06982	    0.07244	    0.07419	    0.07410	    0.07405	    0.07410	    0.07420	    0.07244	    0.06982
                     45	    0.07571	    0.07836	    0.08001	    0.08025	    0.08015	    0.08025	    0.08001	    0.07786	    0.07528
                     50	    0.07671	    0.08008	    0.08228	    0.08236	    0.08221	    0.08236	    0.08228	    0.07972	    0.07670
                     55	    0.07870	    0.08227	    0.08332	    0.08421	    0.08468	    0.08421	    0.08332	    0.08104	    0.07870
                     60	    0.08180	    0.08415	    0.08477	    0.08481	    0.08468	    0.08481	    0.08477	    0.08415	    0.08180
            </tableData>
          </table>
       </product>
    </function>
    <function name="aero/c/CFXDSPL">
    <description>DRAG INCREMENT DUE TO SPOILERS LEFT</description>
    <product>
          <table>
            <independentVar lookup="row">aero/alpha-deg</independentVar>
            <independentVar lookup="column">aero/beta-deg</independentVar>
            <independentVar lookup="table">fcs/speedbrake-left-deg</independentVar>
              <tableData breakPoint="0">
                              -20	       -10	        -5	        -2	         0	         2	         5	        10	        20
                    -10	    0.00000	    0.00000	    0.00000	    0.00000	    0.00000	    0.00000	    0.00000	    0.00000	    0.00000
                     -5	    0.00000	    0.00000	    0.00000	    0.00000	    0.00000	    0.00000	    0.00000	    0.00000	    0.00000
                     -2	    0.00000	    0.00000	    0.00000	    0.00000	    0.00000	    0.00000	    0.00000	    0.00000	    0.00000
                      0	    0.00000	    0.00000	    0.00000	    0.00000	    0.00000	    0.00000	    0.00000	    0.00000	    0.00000
                      1	    0.00000	    0.00000	    0.00000	    0.00000	    0.00000	    0.00000	    0.00000	    0.00000	    0.00000
                      2	    0.00000	    0.00000	    0.00000	    0.00000	    0.00000	    0.00000	    0.00000	    0.00000	    0.00000
                      3	    0.00000	    0.00000	    0.00000	    0.00000	    0.00000	    0.00000	    0.00000	    0.00000	    0.00000
                      4	    0.00000	    0.00000	    0.00000	    0.00000	    0.00000	    0.00000	    0.00000	    0.00000	    0.00000
                      5	    0.00000	    0.00000	    0.00000	    0.00000	    0.00000	    0.00000	    0.00000	    0.00000	    0.00000
                      6	    0.00000	    0.00000	    0.00000	    0.00000	    0.00000	    0.00000	    0.00000	    0.00000	    0.00000
                      7	    0.00000	    0.00000	    0.00000	    0.00000	    0.00000	    0.00000	    0.00000	    0.00000	    0.00000
                      8	    0.00000	    0.00000	    0.00000	    0.00000	    0.00000	    0.00000	    0.00000	    0.00000	    0.00000
                      9	    0.00000	    0.00000	    0.00000	    0.00000	    0.00000	    0.00000	    0.00000	    0.00000	    0.00000
                     10	    0.00000	    0.00000	    0.00000	    0.00000	    0.00000	    0.00000	    0.00000	    0.00000	    0.00000
                     11	    0.00000	    0.00000	    0.00000	    0.00000	    0.00000	    0.00000	    0.00000	    0.00000	    0.00000
                     12	    0.00000	    0.00000	    0.00000	    0.00000	    0.00000	    0.00000	    0.00000	    0.00000	    0.00000
                     13	    0.00000	    0.00000	    0.00000	    0.00000	    0.00000	    0.00000	    0.00000	    0.00000	    0.00000
                     14	    0.00000	    0.00000	    0.00000	    0.00000	    0.00000	    0.00000	    0.00000	    0.00000	    0.00000
                     15	    0.00000	    0.00000	    0.00000	    0.00000	    0.00000	    0.00000	    0.00000	    0.00000	    0.00000
                     16	    0.00000	    0.00000	    0.00000	    0.00000	    0.00000	    0.00000	    0.00000	    0.00000	    0.00000
                     17	    0.00000	    0.00000	    0.00000	    0.00000	    0.00000	    0.00000	    0.00000	    0.00000	    0.00000
                     18	    0.00000	    0.00000	    0.00000	    0.00000	    0.00000	    0.00000	    0.00000	    0.00000	    0.00000
                     19	    0.00000	    0.00000	    0.00000	    0.00000	    0.00000	    0.00000	    0.00000	    0.00000	    0.00000
                     20	    0.00000	    0.00000	    0.00000	    0.00000	    0.00000	    0.00000	    0.00000	    0.00000	    0.00000
                     22	    0.00000	    0.00000	    0.00000	    0.00000	    0.00000	    0.00000	    0.00000	    0.00000	    0.00000
                     24	    0.00000	    0.00000	    0.00000	    0.00000	    0.00000	    0.00000	    0.00000	    0.00000	    0.00000
                     25	    0.00000	    0.00000	    0.00000	    0.00000	    0.00000	    0.00000	    0.00000	    0.00000	    0.00000
                     28	    0.00000	    0.00000	    0.00000	    0.00000	    0.00000	    0.00000	    0.00000	    0.00000	    0.00000
                     30	    0.00000	    0.00000	    0.00000	    0.00000	    0.00000	    0.00000	    0.00000	    0.00000	    0.00000
                     35	    0.00000	    0.00000	    0.00000	    0.00000	    0.00000	    0.00000	    0.00000	    0.00000	    0.00000
                     45	    0.00000	    0.00000	    0.00000	    0.00000	    0.00000	    0.00000	    0.00000	    0.00000	    0.00000
                     50	    0.00000	    0.00000	    0.00000	    0.00000	    0.00000	    0.00000	    0.00000	    0.00000	    0.00000
                     55	    0.00000	    0.00000	    0.00000	    0.00000	    0.00000	    0.00000	    0.00000	    0.00000	    0.00000
                     60	    0.00000	    0.00000	    0.00000	    0.00000	    0.00000	    0.00000	    0.00000	    0.00000	    0.00000
              </tableData>
              <tableData breakPoint="20">
                              -20	       -10	        -5	        -2	         0	         2	         5	        10	        20
                    -10	    0.00983	    0.01051	    0.01074	    0.01104	    0.01127	    0.01145	    0.01153	    0.01209	    0.01241
                     -5	    0.00623	    0.00868	    0.00985	    0.01125	    0.01131	    0.01174	    0.01218	    0.01280	    0.01110
                     -2	    0.00511	    0.00639	    0.00696	    0.00747	    0.00780	    0.00803	    0.00840	    0.00777	    0.00722
                      0	    0.00427	    0.00495	    0.00534	    0.00564	    0.00582	    0.00596	    0.00603	    0.00626	    0.00395
                      1	    0.00405	    0.00422	    0.00466	    0.00480	    0.00482	    0.00485	    0.00483	    0.00494	    0.00234
                      2	    0.00342	    0.00319	    0.00395	    0.00399	    0.00383	    0.00384	    0.00362	    0.00200	    0.00045
                      3	    0.00296	    0.00277	    0.00323	    0.00326	    0.00296	    0.00274	    0.00256	    0.00178	  -0.00090
                      4	    0.00259	    0.00200	    0.00230	    0.00227	    0.00191	    0.00181	    0.00138	    0.00025	  -0.00236
                      5	    0.00211	    0.00135	    0.00147	    0.00088	    0.00080	    0.00056	    0.00030	  -0.00103	  -0.00423
                      6	    0.00135	    0.00087	    0.00051	    0.00000	  -0.00065	  -0.00067	  -0.00050	  -0.00268	  -0.00613
                      7	    0.00090	    0.00033	  -0.00069	  -0.00104	  -0.00166	  -0.00201	  -0.00186	  -0.00516	  -0.00650
                      8	    0.00088	  -0.00200	  -0.00202	  -0.00176	  -0.00315	  -0.00328	  -0.00345	  -0.00517	  -0.00843
                      9	  -0.00034	  -0.00294	  -0.00264	  -0.00356	  -0.00419	  -0.00419	  -0.00493	  -0.00877	  -0.01177
                     10	  -0.00024	  -0.00263	  -0.00377	  -0.00467	  -0.00521	  -0.00550	  -0.00666	  -0.00727	  -0.01233
                     11	  -0.00159	  -0.00297	  -0.00481	  -0.00566	  -0.00631	  -0.00668	  -0.00765	  -0.00893	  -0.01145
                     12	  -0.00273	  -0.00463	  -0.00651	  -0.00691	  -0.00723	  -0.00719	  -0.00780	  -0.00915	  -0.01030
                     13	  -0.00360	  -0.00607	  -0.00700	  -0.00754	  -0.00769	  -0.00765	  -0.00769	  -0.00882	  -0.01015
                     14	  -0.00413	  -0.00693	  -0.00737	  -0.00769	  -0.00782	  -0.00775	  -0.00749	  -0.00819	  -0.00758
                     15	  -0.00577	  -0.00722	  -0.00724	  -0.00739	  -0.00739	  -0.00738	  -0.00737	  -0.00737	  -0.00399
                     16	  -0.00514	  -0.00702	  -0.00717	  -0.00714	  -0.00710	  -0.00709	  -0.00704	  -0.00673	  -0.00121
                     17	  -0.00752	  -0.00671	  -0.00686	  -0.00711	  -0.00675	  -0.00701	  -0.00738	  -0.00638	  -0.00278
                     18	  -0.00729	  -0.00621	  -0.00622	  -0.00651	  -0.00663	  -0.00656	  -0.00644	  -0.00572	  -0.00329
                     19	  -0.00685	  -0.00588	  -0.00621	  -0.00624	  -0.00633	  -0.00631	  -0.00645	  -0.00549	  -0.00434
                     20	  -0.00639	  -0.00523	  -0.00551	  -0.00584	  -0.00567	  -0.00574	  -0.00586	  -0.00579	  -0.00383
                     22	  -0.00492	  -0.00485	  -0.00517	  -0.00544	  -0.00527	  -0.00544	  -0.00570	  -0.00432	  -0.00562
                     24	  -0.00478	  -0.00383	  -0.00473	  -0.00492	  -0.00493	  -0.00980	  -0.00567	  -0.00483	  -0.00246
                     25	  -0.00484	  -0.00449	  -0.00466	  -0.00483	  -0.00468	  -0.00519	  -0.00541	  -0.00520	  -0.00584
                     28	  -0.00414	  -0.00421	  -0.00471	  -0.00485	  -0.00471	  -0.00496	  -0.00453	  -0.00673	  -0.00896
                     30	  -0.00421	  -0.00428	  -0.00482	  -0.00549	  -0.00487	  -0.00506	  -0.00523	  -0.00692	  -0.00914
                     35	  -0.00449	  -0.00484	  -0.00495	  -0.00521	  -0.00534	  -0.00549	  -0.00561	  -0.00706	  -0.00810
                     45	  -0.00363	  -0.00470	  -0.00511	  -0.00513	  -0.00512	  -0.00517	  -0.00543	  -0.00637	  -0.00714
                     50	  -0.00386	  -0.00447	  -0.00477	  -0.00502	  -0.00492	  -0.00490	  -0.00507	  -0.00555	  -0.00678
                     55	  -0.00330	  -0.00423	  -0.00443	  -0.00462	  -0.00469	  -0.00464	  -0.00493	  -0.00646	  -0.00582
                     60	  -0.00277	  -0.00364	  -0.00402	  -0.00407	  -0.00418	  -0.00427	  -0.00442	  -0.00475	  -0.00566
              </tableData>
              <tableData breakPoint="50">
                              -20	       -10	        -5	        -2	         0	         2	         5	        10	        20
                    -10	    0.01542	    0.01596	    0.01653	    0.01711	    0.01747	    0.01783	    0.01813	    0.01895	    0.02003
                     -5	    0.01417	    0.01842	    0.01931	    0.02094	    0.02129	    0.02190	    0.02278	    0.02452	    0.02211
                     -2	    0.01238	    0.01639	    0.01800	    0.01913	    0.01986	    0.02055	    0.02150	    0.02174	    0.01937
                      0	    0.01094	    0.01392	    0.01540	    0.01662	    0.01741	    0.01803	    0.01873	    0.01957	    0.01436
                      1	    0.01066	    0.01279	    0.01425	    0.01517	    0.01562	    0.01610	    0.01652	    0.01732	    0.01152
                      2	    0.00958	    0.01124	    0.01301	    0.01374	    0.01381	    0.01428	    0.01450	    0.01257	    0.00830
                      3	    0.00892	    0.01039	    0.01183	    0.01246	    0.01237	    0.01238	    0.01240	    0.01137	    0.00599
                      4	    0.00826	    0.00950	    0.01040	    0.01083	    0.01060	    0.01066	    0.01044	    0.00872	    0.00302
                      5	    0.00743	    0.00804	    0.00915	    0.00884	    0.00884	    0.00850	    0.00851	    0.00594	    0.00012
                      6	    0.00646	    0.00734	    0.00768	    0.00730	    0.00632	    0.00654	    0.00732	    0.00258	  -0.00303
                      7	    0.00601	    0.00589	    0.00591	    0.00575	    0.00505	    0.00473	    0.00545	  -0.00040	  -0.00309
                      8	    0.00427	    0.00557	    0.00389	    0.00455	    0.00284	    0.00348	    0.00266	  -0.00201	  -0.00576
                      9	    0.00394	    0.00197	    0.00275	    0.00189	    0.00048	    0.00214	    0.00088	  -0.00324	  -0.01141
                     10	    0.00172	    0.00195	    0.00090	    0.00028	  -0.00045	  -0.00041	  -0.00206	  -0.00339	  -0.01231
                     11	    0.00158	    0.00128	  -0.00064	  -0.00122	  -0.00133	  -0.00200	  -0.00381	  -0.00371	  -0.01268
                     12	    0.00001	  -0.00077	  -0.00321	  -0.00298	  -0.00319	  -0.00299	  -0.00443	  -0.00516	  -0.01171
                     13	  -0.00166	  -0.00341	  -0.00436	  -0.00450	  -0.00425	  -0.00414	  -0.00402	  -0.00603	  -0.01101
                     14	  -0.00284	  -0.00503	  -0.00537	  -0.00536	  -0.00551	  -0.00495	  -0.00463	  -0.00586	  -0.00883
                     15	  -0.00502	  -0.00621	  -0.00597	  -0.00579	  -0.00544	  -0.00535	  -0.00508	  -0.00563	  -0.00438
                     16	  -0.00507	  -0.00668	  -0.00621	  -0.00573	  -0.00563	  -0.00537	  -0.00529	  -0.00527	  -0.00037
                     17	  -0.00758	  -0.00699	  -0.00649	  -0.00638	  -0.00588	  -0.00614	  -0.00642	  -0.00560	  -0.00255
                     18	  -0.00873	  -0.00690	  -0.00652	  -0.00664	  -0.00659	  -0.00641	  -0.00652	  -0.00590	  -0.00302
                     19	  -0.00888	  -0.00709	  -0.00721	  -0.00726	  -0.00706	  -0.00697	  -0.00712	  -0.00593	  -0.00218
                     20	  -0.00854	  -0.00673	  -0.00694	  -0.00735	  -0.00714	  -0.00700	  -0.00720	  -0.00692	  -0.00068
                     22	  -0.00757	  -0.00644	  -0.00682	  -0.00722	  -0.00685	  -0.00708	  -0.00748	  -0.00588	  -0.00764
                     24	  -0.00740	  -0.00572	  -0.00658	  -0.00683	  -0.00677	  -0.01176	  -0.00775	  -0.00598	  -0.00654
                     25	  -0.00709	  -0.00638	  -0.00670	  -0.00678	  -0.00679	  -0.00728	  -0.00755	  -0.00743	  -0.01056
                     28	  -0.00628	  -0.00619	  -0.00712	  -0.00722	  -0.00709	  -0.00743	  -0.00694	  -0.01016	  -0.01431
                     30	  -0.00648	  -0.00653	  -0.00744	  -0.00833	  -0.00783	  -0.00782	  -0.00805	  -0.01099	  -0.01481
                     35	  -0.00738	  -0.00781	  -0.00820	  -0.00845	  -0.00869	  -0.00887	  -0.00920	  -0.01133	  -0.01344
                     45	  -0.00667	  -0.00823	  -0.00888	  -0.00901	  -0.00901	  -0.00893	  -0.00921	  -0.01052	  -0.01219
                     50	  -0.00699	  -0.00799	  -0.00858	  -0.00899	  -0.00883	  -0.00871	  -0.00894	  -0.00966	  -0.01179
                     55	  -0.00617	  -0.00775	  -0.00821	  -0.00845	  -0.00865	  -0.00852	  -0.00890	  -0.01033	  -0.01043
                     60	  -0.00545	  -0.00705	  -0.00770	  -0.00779	  -0.00791	  -0.00803	  -0.00820	  -0.00880	  -0.01038
              </tableData>
          </table>
       </product>
    </function>
    <function name="aero/c/CFXDSPR">
    <description>DRAG INCREMENT DUE TO SPOILERS RIGHT</description>
    <product>
          <table>
            <independentVar lookup="row">aero/alpha-deg</independentVar>
            <independentVar lookup="column">aero/beta-deg</independentVar>
            <independentVar lookup="table">fcs/speedbrake-right-deg</independentVar>
              <tableData breakPoint="0">
                              -20	       -10	        -5	        -2	         0	         2	         5	        10	        20
                    -10	    0.00000	    0.00000	    0.00000	    0.00000	    0.00000	    0.00000	    0.00000	    0.00000	    0.00000
                     -5	    0.00000	    0.00000	    0.00000	    0.00000	    0.00000	    0.00000	    0.00000	    0.00000	    0.00000
                     -2	    0.00000	    0.00000	    0.00000	    0.00000	    0.00000	    0.00000	    0.00000	    0.00000	    0.00000
                      0	    0.00000	    0.00000	    0.00000	    0.00000	    0.00000	    0.00000	    0.00000	    0.00000	    0.00000
                      1	    0.00000	    0.00000	    0.00000	    0.00000	    0.00000	    0.00000	    0.00000	    0.00000	    0.00000
                      2	    0.00000	    0.00000	    0.00000	    0.00000	    0.00000	    0.00000	    0.00000	    0.00000	    0.00000
                      3	    0.00000	    0.00000	    0.00000	    0.00000	    0.00000	    0.00000	    0.00000	    0.00000	    0.00000
                      4	    0.00000	    0.00000	    0.00000	    0.00000	    0.00000	    0.00000	    0.00000	    0.00000	    0.00000
                      5	    0.00000	    0.00000	    0.00000	    0.00000	    0.00000	    0.00000	    0.00000	    0.00000	    0.00000
                      6	    0.00000	    0.00000	    0.00000	    0.00000	    0.00000	    0.00000	    0.00000	    0.00000	    0.00000
                      7	    0.00000	    0.00000	    0.00000	    0.00000	    0.00000	    0.00000	    0.00000	    0.00000	    0.00000
                      8	    0.00000	    0.00000	    0.00000	    0.00000	    0.00000	    0.00000	    0.00000	    0.00000	    0.00000
                      9	    0.00000	    0.00000	    0.00000	    0.00000	    0.00000	    0.00000	    0.00000	    0.00000	    0.00000
                     10	    0.00000	    0.00000	    0.00000	    0.00000	    0.00000	    0.00000	    0.00000	    0.00000	    0.00000
                     11	    0.00000	    0.00000	    0.00000	    0.00000	    0.00000	    0.00000	    0.00000	    0.00000	    0.00000
                     12	    0.00000	    0.00000	    0.00000	    0.00000	    0.00000	    0.00000	    0.00000	    0.00000	    0.00000
                     13	    0.00000	    0.00000	    0.00000	    0.00000	    0.00000	    0.00000	    0.00000	    0.00000	    0.00000
                     14	    0.00000	    0.00000	    0.00000	    0.00000	    0.00000	    0.00000	    0.00000	    0.00000	    0.00000
                     15	    0.00000	    0.00000	    0.00000	    0.00000	    0.00000	    0.00000	    0.00000	    0.00000	    0.00000
                     16	    0.00000	    0.00000	    0.00000	    0.00000	    0.00000	    0.00000	    0.00000	    0.00000	    0.00000
                     17	    0.00000	    0.00000	    0.00000	    0.00000	    0.00000	    0.00000	    0.00000	    0.00000	    0.00000
                     18	    0.00000	    0.00000	    0.00000	    0.00000	    0.00000	    0.00000	    0.00000	    0.00000	    0.00000
                     19	    0.00000	    0.00000	    0.00000	    0.00000	    0.00000	    0.00000	    0.00000	    0.00000	    0.00000
                     20	    0.00000	    0.00000	    0.00000	    0.00000	    0.00000	    0.00000	    0.00000	    0.00000	    0.00000
                     22	    0.00000	    0.00000	    0.00000	    0.00000	    0.00000	    0.00000	    0.00000	    0.00000	    0.00000
                     24	    0.00000	    0.00000	    0.00000	    0.00000	    0.00000	    0.00000	    0.00000	    0.00000	    0.00000
                     25	    0.00000	    0.00000	    0.00000	    0.00000	    0.00000	    0.00000	    0.00000	    0.00000	    0.00000
                     28	    0.00000	    0.00000	    0.00000	    0.00000	    0.00000	    0.00000	    0.00000	    0.00000	    0.00000
                     30	    0.00000	    0.00000	    0.00000	    0.00000	    0.00000	    0.00000	    0.00000	    0.00000	    0.00000
                     35	    0.00000	    0.00000	    0.00000	    0.00000	    0.00000	    0.00000	    0.00000	    0.00000	    0.00000
                     45	    0.00000	    0.00000	    0.00000	    0.00000	    0.00000	    0.00000	    0.00000	    0.00000	    0.00000
                     50	    0.00000	    0.00000	    0.00000	    0.00000	    0.00000	    0.00000	    0.00000	    0.00000	    0.00000
                     55	    0.00000	    0.00000	    0.00000	    0.00000	    0.00000	    0.00000	    0.00000	    0.00000	    0.00000
                     60	    0.00000	    0.00000	    0.00000	    0.00000	    0.00000	    0.00000	    0.00000	    0.00000	    0.00000
              </tableData>
              <tableData breakPoint="20">
                              -20	       -10	        -5	        -2	         0	         2	         5	        10	        20
                    -10	    0.01241	    0.01209	    0.01153	    0.01145	    0.01127	    0.01104	    0.01074	    0.01051	    0.00983
                     -5	    0.01110	    0.01280	    0.01218	    0.01226	    0.01131	    0.01073	    0.00985	    0.00868	    0.00623
                     -2	    0.00722	    0.00777	    0.00840	    0.00813	    0.00780	    0.00737	    0.00696	    0.00639	    0.00511
                      0	    0.00395	    0.00626	    0.00603	    0.00596	    0.00582	    0.00564	    0.00534	    0.00495	    0.00427
                      1	    0.00234	    0.00494	    0.00483	    0.00485	    0.00482	    0.00480	    0.00466	    0.00422	    0.00405
                      2	    0.00077	    0.00358	    0.00362	    0.00384	    0.00383	    0.00399	    0.00395	    0.00161	    0.00310
                      3	  -0.00090	    0.00178	    0.00256	    0.00274	    0.00296	    0.00326	    0.00323	    0.00277	    0.00296
                      4	  -0.00236	    0.00025	    0.00138	    0.00181	    0.00191	    0.00227	    0.00230	    0.00200	    0.00259
                      5	  -0.00423	  -0.00111	    0.00030	    0.00023	    0.00080	    0.00121	    0.00147	    0.00143	    0.00211
                      6	  -0.00613	  -0.00268	  -0.00046	  -0.00067	  -0.00065	    0.00000	    0.00047	    0.00087	    0.00135
                      7	  -0.00650	  -0.00430	  -0.00186	  -0.00201	  -0.00166	  -0.00104	  -0.00069	  -0.00053	    0.00090
                      8	  -0.00843	  -0.00518	  -0.00345	  -0.00328	  -0.00315	  -0.00176	  -0.00202	  -0.00199	    0.00088
                      9	  -0.01177	  -0.00877	  -0.00493	  -0.00449	  -0.00419	  -0.00326	  -0.00264	  -0.00294	  -0.00034
                     10	  -0.01233	  -0.00727	  -0.00666	  -0.00550	  -0.00521	  -0.00467	  -0.00377	  -0.00263	  -0.00024
                     11	  -0.01145	  -0.00893	  -0.00765	  -0.00668	  -0.00631	  -0.00566	  -0.00481	  -0.00297	  -0.00159
                     12	  -0.01068	  -0.00915	  -0.00780	  -0.00719	  -0.00723	  -0.00691	  -0.00651	  -0.00463	  -0.00235
                     13	  -0.01015	  -0.00882	  -0.00767	  -0.00765	  -0.00769	  -0.00754	  -0.00702	  -0.00607	  -0.00360
                     14	  -0.00696	  -0.00819	  -0.00749	  -0.00775	  -0.00782	  -0.00769	  -0.00737	  -0.00693	  -0.00475
                     15	  -0.00399	  -0.00737	  -0.00737	  -0.00738	  -0.00739	  -0.00739	  -0.00724	  -0.00722	  -0.00577
                     16	  -0.00121	  -0.00673	  -0.00704	  -0.00711	  -0.00710	  -0.00712	  -0.00717	  -0.00702	  -0.00514
                     17	  -0.00278	  -0.00638	  -0.00738	  -0.00701	  -0.00675	  -0.00711	  -0.00686	  -0.00671	  -0.00752
                     18	  -0.00329	  -0.00572	  -0.00644	  -0.00656	  -0.00663	  -0.00651	  -0.00622	  -0.00621	  -0.00729
                     19	  -0.00434	  -0.00549	  -0.00645	  -0.00631	  -0.00633	  -0.00624	  -0.00621	  -0.00588	  -0.00685
                     20	  -0.00383	  -0.00524	  -0.00589	  -0.00574	  -0.00567	  -0.00584	  -0.00548	  -0.00578	  -0.00639
                     22	  -0.00562	  -0.00482	  -0.00570	  -0.00546	  -0.00527	  -0.00542	  -0.00517	  -0.00435	  -0.00492
                     24	  -0.00494	  -0.00403	  -0.00567	  -0.00533	  -0.00493	  -0.00939	  -0.00473	  -0.00463	  -0.00230
                     25	  -0.00584	  -0.00520	  -0.00541	  -0.00519	  -0.00468	  -0.00483	  -0.00466	  -0.00449	  -0.00484
                     28	  -0.00896	  -0.00673	  -0.00528	  -0.00496	  -0.00471	  -0.00485	  -0.00396	  -0.00421	  -0.00414
                     30	  -0.00914	  -0.00692	  -0.00523	  -0.00506	  -0.00487	  -0.00549	  -0.00482	  -0.00428	  -0.00421
                     35	  -0.00810	  -0.00706	  -0.00562	  -0.00549	  -0.00534	  -0.00521	  -0.00494	  -0.00484	  -0.00449
                     45	  -0.00671	  -0.00587	  -0.00543	  -0.00517	  -0.00512	  -0.00513	  -0.00511	  -0.00520	  -0.00406
                     50	  -0.00677	  -0.00519	  -0.00507	  -0.00490	  -0.00492	  -0.00502	  -0.00477	  -0.00483	  -0.00387
                     55	  -0.00582	  -0.00523	  -0.00493	  -0.00464	  -0.00469	  -0.00462	  -0.00443	  -0.00546	  -0.00330
                     60	  -0.00566	  -0.00475	  -0.00442	  -0.00427	  -0.00418	  -0.00407	  -0.00402	  -0.00364	  -0.00277
              </tableData>
              <tableData breakPoint="50">
                              -20	       -10	        -5	        -2	         0	         2	         5	        10	        20
                    -10	    0.02003	    0.01895	    0.01813	    0.01783	    0.01747	    0.01711	    0.01653	    0.01596	    0.01542
                     -5	    0.02211	    0.02452	    0.02278	    0.02242	    0.02129	    0.02042	    0.01931	    0.01842	    0.01417
                     -2	    0.01937	    0.02174	    0.02150	    0.02065	    0.01986	    0.01903	    0.01800	    0.01639	    0.01238
                      0	    0.01436	    0.01957	    0.01873	    0.01803	    0.01741	    0.01662	    0.01540	    0.01392	    0.01094
                      1	    0.01152	    0.01732	    0.01652	    0.01610	    0.01562	    0.01517	    0.01425	    0.01279	    0.01066
                      2	    0.00862	    0.01415	    0.01450	    0.01428	    0.01381	    0.01374	    0.01301	    0.00966	    0.00926
                      3	    0.00599	    0.01137	    0.01240	    0.01238	    0.01237	    0.01246	    0.01183	    0.01039	    0.00892
                      4	    0.00302	    0.00872	    0.01044	    0.01066	    0.01060	    0.01083	    0.01040	    0.00950	    0.00826
                      5	    0.00012	    0.00586	    0.00851	    0.00817	    0.00884	    0.00917	    0.00915	    0.00812	    0.00743
                      6	  -0.00303	    0.00258	    0.00736	    0.00654	    0.00632	    0.00730	    0.00764	    0.00734	    0.00646
                      7	  -0.00309	    0.00046	    0.00545	    0.00473	    0.00505	    0.00575	    0.00591	    0.00503	    0.00601
                      8	  -0.00576	  -0.00202	    0.00266	    0.00348	    0.00284	    0.00455	    0.00389	    0.00558	    0.00427
                      9	  -0.01141	  -0.00324	    0.00088	    0.00184	    0.00048	    0.00219	    0.00275	    0.00197	    0.00394
                     10	  -0.01231	  -0.00339	  -0.00206	  -0.00041	  -0.00045	    0.00028	    0.00090	    0.00195	    0.00172
                     11	  -0.01268	  -0.00371	  -0.00381	  -0.00200	  -0.00133	  -0.00122	  -0.00064	    0.00128	    0.00158
                     12	  -0.01209	  -0.00516	  -0.00443	  -0.00299	  -0.00319	  -0.00298	  -0.00321	  -0.00077	    0.00039
                     13	  -0.01101	  -0.00603	  -0.00400	  -0.00414	  -0.00425	  -0.00450	  -0.00438	  -0.00341	  -0.00166
                     14	  -0.00821	  -0.00586	  -0.00463	  -0.00495	  -0.00551	  -0.00536	  -0.00537	  -0.00503	  -0.00346
                     15	  -0.00438	  -0.00563	  -0.00508	  -0.00535	  -0.00544	  -0.00579	  -0.00597	  -0.00621	  -0.00502
                     16	  -0.00037	  -0.00527	  -0.00529	  -0.00539	  -0.00563	  -0.00571	  -0.00621	  -0.00668	  -0.00507
                     17	  -0.00255	  -0.00560	  -0.00642	  -0.00614	  -0.00588	  -0.00638	  -0.00649	  -0.00699	  -0.00758
                     18	  -0.00302	  -0.00590	  -0.00652	  -0.00641	  -0.00659	  -0.00664	  -0.00652	  -0.00690	  -0.00873
                     19	  -0.00218	  -0.00593	  -0.00712	  -0.00697	  -0.00706	  -0.00726	  -0.00721	  -0.00709	  -0.00888
                     20	  -0.00068	  -0.00637	  -0.00723	  -0.00700	  -0.00714	  -0.00735	  -0.00691	  -0.00728	  -0.00854
                     22	  -0.00764	  -0.00638	  -0.00748	  -0.00710	  -0.00685	  -0.00720	  -0.00682	  -0.00594	  -0.00757
                     24	  -0.00902	  -0.00518	  -0.00775	  -0.00729	  -0.00677	  -0.01130	  -0.00658	  -0.00652	  -0.00492
                     25	  -0.01056	  -0.00743	  -0.00755	  -0.00728	  -0.00679	  -0.00678	  -0.00670	  -0.00638	  -0.00709
                     28	  -0.01431	  -0.01016	  -0.00769	  -0.00743	  -0.00709	  -0.00722	  -0.00637	  -0.00619	  -0.00628
                     30	  -0.01481	  -0.01099	  -0.00805	  -0.00782	  -0.00783	  -0.00833	  -0.00744	  -0.00653	  -0.00648
                     35	  -0.01344	  -0.01133	  -0.00921	  -0.00887	  -0.00869	  -0.00845	  -0.00819	  -0.00781	  -0.00738
                     45	  -0.01176	  -0.01002	  -0.00921	  -0.00893	  -0.00901	  -0.00901	  -0.00888	  -0.00873	  -0.00710
                     50	  -0.01178	  -0.00930	  -0.00894	  -0.00871	  -0.00883	  -0.00899	  -0.00858	  -0.00835	  -0.00700
                     55	  -0.01043	  -0.00910	  -0.00890	  -0.00852	  -0.00865	  -0.00845	  -0.00821	  -0.00898	  -0.00617
                     60	  -0.01038	  -0.00880	  -0.00820	  -0.00803	  -0.00791	  -0.00779	  -0.00770	  -0.00705	  -0.00545
              </tableData>
          </table>
       </product>
    </function>
    <function name="aero/c/CFZB">
    <description>BASE LIFT</description>
    <product>
          <table>
            <independentVar lookup="row">aero/alpha-deg</independentVar>
            <independentVar lookup="column">fcs/pitch-pos-deg</independentVar>
            <tableData>
                                -17	        -15	        -10	         -5	          0	          5	         10	         15	         20	         25	         30
                    -10	  -1.36582	  -1.34857	  -1.30360	  -1.28381	  -1.20747	  -1.15934	  -1.11243	  -1.06775	  -1.02644	  -0.98976	  -0.95858
                      3	    0.22728	    0.24262	    0.28281	    0.32485	    0.36792	    0.41163	    0.45509	    0.49688	    0.53564	    0.57016	    0.59949
                      9	    0.97961	    0.99675	    1.04330	    1.08886	    1.13681	    1.18325	    1.23021	    1.27466	    1.31516	    1.35073	    1.37230
                     15	    1.55065	    1.65727	    1.61165	    1.65730	    1.70371	    1.75001	    1.79505	    1.83722	    1.85732	    1.86925	    1.87290
                     22	    1.72899	    1.74646	    1.79200	    1.83906	    1.88666	    1.91820	    1.93174	    1.93863	    1.94179	    1.94571	    1.94897
                     45	    1.88165	    1.88224	    1.88360	    1.88478	    1.88580	    1.88665	    1.88735	    1.88791	    1.88880	    1.88868	    1.88891
                     60	    1.82627	    1.82819	    1.82916	    1.83005	    1.83081	    1.83142	    1.83190	    1.83225	    1.83242	    1.83261	    1.83267
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            </tableData>
          </table>
       </product>
    </function>
    <function name="aero/c/CFZDAD">
    <description>LIFT INCREMENT DUE TO AILERON DEFLECTION</description>
    <product>
          <property>fcs/roll-pos-deg</property>
          <table>
            <independentVar lookup="row">aero/alpha-deg</independentVar>
            <independentVar lookup="column">aero/beta-deg</independentVar>
            <tableData>
                                -20	        -10	         -5	         -2	          0	          2	          5	         10	         20
                    -10	  -0.00194	  -0.00210	  -0.00199	  -0.00188	  -0.00184	  -0.00176	  -0.00161	  -0.00129	  -0.00039
                      3	  -0.00085	  -0.00046	  -0.00026	  -0.00015	  -0.00008	    0.00003	    0.00027	    0.00067	    0.00128
                      9	    0.00160	    0.00125	    0.00139	    0.00160	    0.00163	    0.00167	    0.00180	    0.00177	    0.00172
                     15	    0.00211	    0.00140	    0.00117	    0.00107	    0.00100	    0.00096	    0.00090	    0.00084	  -0.00014
                     22	    0.00036	    0.00004	  -0.00015	    0.00003	    0.00003	    0.00002	    0.00003	  -0.00005	   0.00000
                     45	    0.00001	    0.00003	    0.00003	    0.00002	    0.00002	    0.00001	    0.00001	    0.00000	    0.00004
                     60	    0.00002	    0.00002	    0.00002	    0.00002	    0.00002	    0.00002	    0.00002	    0.00002	    0.00002
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            </tableData>
          </table>
       </product>
    </function>
    <function name="aero/c/CFZDFM">
    <description>LIFT INCREMENT DUE TO FLAPS</description>
    <product>
          <property>fcs/flap-pos-deg</property>
          <table>
            <independentVar lookup="row">aero/alpha-deg</independentVar>
            <independentVar lookup="column">aero/beta-deg</independentVar>
            <tableData>
                                -20	        -10	         -5	         -2	          0	          2	          5	         10	         20
                    -10	    0.60028	    0.65862	    0.67446	    0.67927	    0.67842	    0.67927	    0.67446	    0.65862	    0.60028
                      3	    0.82659	    0.92363	    0.95551	    0.96084	    0.95851	    0.96084	    0.95551	    0.92363	    0.82659
                      9	    0.68945	    0.81625	    0.84882	    0.84101	    0.83126	    0.84334	    0.84882	    0.81625	    0.68945
                     15	    0.53570	    0.44925	    0.44238	    0.43528	    0.44264	    0.43528	    0.44238	    0.44925	    0.53570
                     22	    0.34782	    0.35250	    0.35103	    0.35211	    0.35336	    0.35235	    0.35103	    0.35409	    0.34782
                     45	    0.40959	    0.41094	    0.40919	    0.40841	    0.40822	    0.40841	    0.40919	    0.41099	    0.40907
                     60	    0.41598	    0.43003	    0.43187	    0.43104	    0.43057	    0.43104	    0.43187	    0.43003	    0.41598
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            </tableData>
          </table>
       </product>
    </function>
    <function name="aero/c/CFZDRD">
    <description>LIFT INCREMENT DUE TO RUDDER DEFLECTION</description>
    <product>
          <property>fcs/rudder-pos-deg</property>
          <table>
            <independentVar lookup="row">aero/alpha-deg</independentVar>
            <independentVar lookup="column">aero/beta-deg</independentVar>
            <tableData>
                                -20	        -10	         -5	         -2	          0	          2	          5	         10	         20
                    -10	  -0.00019	    0.00001	  -0.00002	  -0.00013	  -0.00069	    0.00027	    0.00016	    0.00014	    0.00036
                      3	    0.00018	    0.00010	  -0.00019	  -0.00005	  -0.00010	  -0.00011	    0.00001	  -0.00001	    0.00025
                      9	    0.00016	    0.00025	    0.00042	    0.00009	  -0.00018	  -0.00056	  -0.00031	    0.00022	    0.00023
                     15	    0.00044	    0.00002	  -0.00029	  -0.00008	    0.00006	    0.00019	    0.00013	    0.00023	    0.00053
                     22	    0.00016	    0.00006	    0.00008	   0.00000	    0.00012	    0.00029	    0.00040	    0.00035	    0.00028
                     45	  -0.00011	    0.00004	    0.00009	    0.00012	    0.00004	  -0.00005	  -0.00005	  -0.00001	    0.00019
                     60	    0.00004	    0.00000	   0.00000	    0.00000	   0.00000	   0.00000	    0.00000	    0.00002	    0.00007
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            </tableData>
          </table>
       </product>
    </function>
    <function name="aero/c/CFZDSM">
    <description>LIFT INCREMENT DUE TO SLATS</description>
    <product>
          <property>fcs/slat-pos-deg</property>
          <table>
            <independentVar lookup="row">aero/alpha-deg</independentVar>
            <independentVar lookup="column">aero/beta-deg</independentVar>
            <tableData>
                                -20	        -10	         -5	         -2	          0	          2	          5	         10	         20
                    -10	    0.39292	    0.43720	    0.45039	    0.45390	    0.45410	    0.45390	    0.45039	    0.43720	    0.39292
                      3	    0.57353	    0.64195	    0.65918	    0.66176	    0.66219	    0.66176	    0.65918	    0.64195	    0.57353
                      9	    0.53557	    0.62139	    0.67429	    0.69542	    0.69371	    0.69775	    0.67429	    0.62139	    0.53557
                     15	    0.48048	    0.44676	    0.43573	    0.43398	    0.43268	    0.43398	    0.43573	    0.44676	    0.48048
                     22	    0.37018	    0.35690	    0.35347	    0.35023	    0.34954	    0.35047	    0.35347	    0.35849	    0.37018
                     45	    0.38944	    0.39457	    0.39668	    0.39681	    0.39673	    0.39681	    0.39668	    0.39462	    0.38892
                     60	    0.37842	    0.38395	    0.38530	    0.38545	    0.38531	    0.38545	    0.38530	    0.38395	    0.37842
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            </tableData>
          </table>
       </product>
    </function>
    <function name="aero/c/CFZDSPL">
    <description>LIFT INCREMENT DUE TO SPOILERS LEFT</description>
    <product>
          <table>
            <independentVar lookup="row">aero/alpha-deg</independentVar>
            <independentVar lookup="column">aero/beta-deg</independentVar>
            <independentVar lookup="table">fcs/speedbrake-left-deg</independentVar>
              <tableData breakPoint="0">
                              -20	       -10	        -5	        -2	         0	         2	         5	        10	        20
                    -10	    0.00000	    0.00000	    0.00000	    0.00000	    0.00000	    0.00000	    0.00000	    0.00000	    0.00000
                      3	    0.00000	    0.00000	    0.00000	    0.00000	    0.00000	    0.00000	    0.00000	    0.00000	    0.00000
                      9	    0.00000	    0.00000	    0.00000	    0.00000	    0.00000	    0.00000	    0.00000	    0.00000	    0.00000
                     15	    0.00000	    0.00000	    0.00000	    0.00000	    0.00000	    0.00000	    0.00000	    0.00000	    0.00000
                     22	    0.00000	    0.00000	    0.00000	    0.00000	    0.00000	    0.00000	    0.00000	    0.00000	    0.00000
                     45	    0.00000	    0.00000	    0.00000	    0.00000	    0.00000	    0.00000	    0.00000	    0.00000	    0.00000
                     60	    0.00000	    0.00000	    0.00000	    0.00000	    0.00000	    0.00000	    0.00000	    0.00000	    0.00000
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              </tableData>
              <tableData breakPoint="20">
                              -20	       -10	        -5	        -2	         0	         2	         5	        10	        20
                    -10	  -0.14960	  -0.14229	  -0.13479	  -0.12936	  -0.12582	  -0.12379	  -0.12081	  -0.11787	  -0.12447
                      3	  -0.14455	  -0.18287	  -0.19899	  -0.20900	  -0.21539	  -0.21966	  -0.21917	  -0.21494	  -0.19002
                      9	  -0.14690	  -0.21178	  -0.22616	  -0.24106	  -0.25093	  -0.25552	  -0.26222	  -0.26173	  -0.21878
                     15	  -0.14830	  -0.14735	  -0.12203	  -0.10965	  -0.10102	  -0.09326	  -0.08129	  -0.06304	  -0.03599
                     22	  -0.01133	  -0.00968	  -0.00955	  -0.00885	  -0.00578	  -0.00428	  -0.00270	    0.00701	    0.01783
                     45	  -0.00261	  -0.00283	  -0.00281	  -0.00255	  -0.00220	  -0.00175	  -0.00164	  -0.00175	  -0.00315
                     60	  -0.00214	  -0.00219	  -0.00209	  -0.00205	  -0.00196	  -0.00188	  -0.00193	  -0.00197	  -0.00168
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              </tableData>
              <tableData breakPoint="50">
                              -20	       -10	        -5	        -2	         0	         2	         5	        10	        20
                    -10	  -0.18955	  -0.17965	  -0.17068	  -0.16579	  -0.16165	  -0.15812	  -0.15276	  -0.14498	  -0.14150
                      3	  -0.24250	  -0.30642	  -0.33451	  -0.35104	  -0.36221	  -0.36833	  -0.36745	  -0.35740	  -0.31289
                      9	  -0.23619	  -0.34999	  -0.37911	  -0.40361	  -0.42091	  -0.42114	  -0.43808	  -0.41875	  -0.36323
                     15	  -0.25378	  -0.28581	  -0.26820	  -0.26071	  -0.25337	  -0.24773	  -0.23617	  -0.21756	  -0.18541
                     22	  -0.09625	  -0.03668	  -0.02125	  -0.01573	  -0.00995	  -0.00763	  -0.00527	    0.00855	    0.02820
                     45	  -0.00626	  -0.00563	  -0.00561	  -0.00513	  -0.00443	  -0.00361	  -0.00328	  -0.00352	  -0.00592
                     60	  -0.00519	  -0.00472	  -0.00435	  -0.00426	  -0.00408	  -0.00390	  -0.00394	  -0.00393	  -0.00360
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              </tableData>
          </table>
       </product>
    </function>
    <function name="aero/c/CFZDSPR">
    <description>LIFT INCREMENT DUE TO SPOILERS RIGHT</description>
    <product>
          <table>
            <independentVar lookup="row">aero/alpha-deg</independentVar>
            <independentVar lookup="column">aero/beta-deg</independentVar>
            <independentVar lookup="table">fcs/speedbrake-right-deg</independentVar>
              <tableData breakPoint="0">
                              -20	       -10	        -5	        -2	         0	         2	         5	        10	        20
                    -10	    0.00000	    0.00000	    0.00000	    0.00000	    0.00000	    0.00000	    0.00000	    0.00000	    0.00000
                      3	    0.00000	    0.00000	    0.00000	    0.00000	    0.00000	    0.00000	    0.00000	    0.00000	    0.00000
                      9	    0.00000	    0.00000	    0.00000	    0.00000	    0.00000	    0.00000	    0.00000	    0.00000	    0.00000
                     15	    0.00000	    0.00000	    0.00000	    0.00000	    0.00000	    0.00000	    0.00000	    0.00000	    0.00000
                     22	    0.00000	    0.00000	    0.00000	    0.00000	    0.00000	    0.00000	    0.00000	    0.00000	    0.00000
                     45	    0.00000	    0.00000	    0.00000	    0.00000	    0.00000	    0.00000	    0.00000	    0.00000	    0.00000
                     60	    0.00000	    0.00000	    0.00000	    0.00000	    0.00000	    0.00000	    0.00000	    0.00000	    0.00000
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              </tableData>
              <tableData breakPoint="20">
                              -20	       -10	        -5	        -2	         0	         2	         5	        10	        20
                    -10	  -0.12447	  -0.11787	  -0.12081	  -0.12379	  -0.12582	  -0.12936	  -0.13479	  -0.14229	  -0.14960
                      3	  -0.19002	  -0.21494	  -0.21917	  -0.21966	  -0.21539	  -0.20900	  -0.19899	  -0.18287	  -0.14455
                      9	  -0.21878	  -0.26173	  -0.26222	  -0.25785	  -0.25093	  -0.23873	  -0.22616	  -0.21178	  -0.14690
                     15	  -0.03599	  -0.06304	  -0.08129	  -0.09326	  -0.10102	  -0.10965	  -0.12203	  -0.14735	  -0.14830
                     22	    0.01783	    0.00542	  -0.00270	  -0.00452	  -0.00578	  -0.00861	  -0.00955	  -0.00809	  -0.01133
                     45	  -0.00263	  -0.00180	  -0.00164	  -0.00175	  -0.00220	  -0.00255	  -0.00281	  -0.00278	  -0.00313
                     60	  -0.00168	  -0.00197	  -0.00193	  -0.00188	  -0.00196	  -0.00205	  -0.00209	  -0.00219	  -0.00214
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              </tableData>
              <tableData breakPoint="50">
                              -20	       -10	        -5	        -2	         0	         2	         5	        10	        20
                    -10	  -0.14150	  -0.14498	  -0.15276	  -0.15812	  -0.16165	  -0.16579	  -0.17068	  -0.17965	  -0.18955
                      3	  -0.31289	  -0.35740	  -0.36745	  -0.36833	  -0.36221	  -0.35104	  -0.33451	  -0.30642	  -0.24250
                      9	  -0.36323	  -0.41875	  -0.43808	  -0.42347	  -0.42091	  -0.40128	  -0.37911	  -0.34999	  -0.23619
                     15	  -0.18541	  -0.21756	  -0.23617	  -0.24773	  -0.25337	  -0.26071	  -0.26820	  -0.28581	  -0.25378
                     22	    0.02820	    0.00696	  -0.00527	  -0.00787	  -0.00995	  -0.01549	  -0.02125	  -0.03509	  -0.09625
                     45	  -0.00540	  -0.00357	  -0.00328	  -0.00361	  -0.00443	  -0.00513	  -0.00561	  -0.00558	  -0.00678
                     60	  -0.00360	  -0.00393	  -0.00394	  -0.00390	  -0.00408	  -0.00426	  -0.00435	  -0.00472	  -0.00519
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              </tableData>
          </table>
       </product>
    </function>
    <function name="aero/c/CMM1">
    <description>BASE PITCHING MOMENT</description>
    <product>
          <table>
            <independentVar lookup="row">aero/alpha-deg</independentVar>
            <independentVar lookup="column">fcs/pitch-pos-deg</independentVar>
            <tableData>
                                -17	        -15	        -10	         -5	          0	          5	         10	         15	         20	         25	         30
                    -10	    1.12314	    1.06113	    0.90057	    0.74942	    0.56089	    0.39291	    0.22975	    0.07510	  -0.06690	  -0.19245	  -0.29876
                      3	    0.32397	    0.26698	    0.11788	  -0.03795	  -0.19744	  -0.35940	  -0.52055	  -0.67561	  -0.81951	  -0.94779	  -1.05678
                      9	    0.03252	  -0.02723	  -0.19481	  -0.34935	  -0.51615	  -0.68010	  -0.84567	  -1.00367	  -1.14882	  -1.27571	  -1.35076
                     15	  -0.18131	  -0.35437	  -0.40217	  -0.56950	  -0.74038	  -0.91150	  -1.07900	  -1.23601	  -1.30996	  -1.35359	  -1.36687
                     22	  -0.43625	  -0.50004	  -0.66697	  -0.84054	  -1.01725	  -1.13566	  -1.18832	  -1.21495	  -1.23075	  -1.24731	  -1.26026
                     45	  -0.65264	  -0.65684	  -0.66702	  -0.67643	  -0.68493	  -0.69236	  -0.69869	  -0.70389	  -0.70752	  -0.71115	  -0.71341
                     60	  -0.38223	  -0.37974	  -0.38678	  -0.39340	  -0.39926	  -0.40413	  -0.40801	  -0.41086	  -0.41168	  -0.41390	  -0.41441
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            </tableData>
          </table>
       </product>
    </function>
    <function name="aero/c/CMMALPHADOT">
    <description>PITCH MOMENT DERIVATIVE FOR ALPHA DOT</description>
    <product>
          <property>aero/alphadot-rad_sec</property>
          <table>
            <independentVar lookup="row">aero/alpha-deg</independentVar>
            <tableData>
                    -10		  -4.75511
                     -5		  -4.70874
                      4		  -3.47565
                     10		  -3.84583
                     16		  -2.40600
                     24		    0.25608
                     50		    1.12410
                     60		    0.88488
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            </tableData>
          </table>
       </product>
    </function>
    <function name="aero/c/CMMBETADOT">
    <description>PITCH MOMENT DERIVATIVE FOR BETA DOT</description>
    <product>
          <property>aero/betadot-rad_sec</property>
          <table>
            <independentVar lookup="row">aero/alpha-deg</independentVar>
            <tableData>
                    -10		    1.77865
                     -5		    0.22011
                      4		  -0.06168
                     10		    0.12357
                     16		  -0.35727
                     24		  -0.10908
                     50		    0.06182
                     60		  -0.03633
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            </tableData>
          </table>
       </product>
    </function>
    <function name="aero/c/CMMDAD">
    <description>PITCH MOMENT DUE TO AILERON DEFLECTION</description>
    <product>
          <property>fcs/roll-pos-deg</property>
          <table>
            <independentVar lookup="row">aero/alpha-deg</independentVar>
            <independentVar lookup="column">aero/beta-deg</independentVar>
            <tableData>
                                -20	        -10	         -5	         -2	          0	          2	          5	         10	         20
                    -10	    0.00128	    0.00168	    0.00163	    0.00154	    0.00150	    0.00146	    0.00134	    0.00115	    0.00053
                      3	    0.00077	    0.00047	    0.00030	    0.00014	    0.00007	  -0.00003	  -0.00032	  -0.00068	  -0.00117
                      9	  -0.00180	  -0.00046	  -0.00092	  -0.00159	  -0.00137	  -0.00133	  -0.00162	  -0.00175	  -0.00135
                     15	  -0.00182	  -0.00122	  -0.00102	  -0.00094	  -0.00089	  -0.00088	  -0.00085	  -0.00076	    0.00009
                     22	  -0.00067	  -0.00023	  -0.00402	  -0.00012	  -0.00011	  -0.00005	  -0.00012	    0.00023	    0.00018
                     45	  -0.00005	  -0.00008	  -0.00007	  -0.00005	  -0.00002	   0.00000	    0.00001	    0.00021	    0.00011
                     60	  -0.00004	  -0.00004	  -0.00004	  -0.00004	  -0.00003	  -0.00002	  -0.00002	  -0.00003	  -0.00005
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            </tableData>
          </table>
       </product>
    </function>
    <function name="aero/c/CMMDFM">
    <description>PITCHING MOMENT INCREMENT DUE TO FLAPS</description>
    <product>
          <property>fcs/flap-pos-deg</property>
          <table>
            <independentVar lookup="row">aero/alpha-deg</independentVar>
            <independentVar lookup="column">aero/beta-deg</independentVar>
            <tableData>
                                -20	        -10	         -5	         -2	          0	          2	          5	         10	         20
                    -10	  -0.38954	  -0.41995	  -0.42891	  -0.43317	  -0.43084	  -0.43317	  -0.42891	  -0.41995	  -0.38954
                      3	  -0.48956	  -0.55602	  -0.59206	  -0.59152	  -0.57888	  -0.59152	  -0.59206	  -0.55602	  -0.48956
                      9	  -0.32771	  -0.50036	  -0.53004	  -0.49809	  -0.46375	  -0.50693	  -0.53004	  -0.50036	  -0.32771
                     15	  -0.24887	  -0.29238	  -0.27282	  -0.27780	  -0.28579	  -0.27780	  -0.27282	  -0.29238	  -0.24887
                     22	  -0.18428	  -0.18462	  -0.15689	  -0.15535	  -0.16811	  -0.15704	  -0.15689	  -0.19032	  -0.18428
                     45	  -0.26159	  -0.24777	  -0.25181	  -0.25888	  -0.26037	  -0.25888	  -0.25182	  -0.25282	  -0.26141
                     60	  -0.19164	  -0.21244	  -0.22161	  -0.22424	  -0.22449	  -0.22424	  -0.22161	  -0.21244	  -0.19164
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            </tableData>
          </table>
       </product>
    </function>
    <function name="aero/c/CMMDRD">
    <description>PITCH MOMENT DUE TO RUDDER DEFLECTION</description>
    <product>
          <property>fcs/rudder-pos-deg</property>
          <table>
            <independentVar lookup="row">aero/alpha-deg</independentVar>
            <independentVar lookup="column">aero/beta-deg</independentVar>
            <tableData>
                                -20	        -10	         -5	         -2	          0	          2	          5	         10	         20
                    -10	    0.00057	  -0.00015	  -0.00031	    0.00006	    0.00198	  -0.00019	  -0.00141	  -0.00150	  -0.00280
                      3	  -0.00024	    0.00029	    0.00048	    0.00083	    0.00024	  -0.00041	  -0.00053	  -0.00107	  -0.00220
                      9	  -0.00055	  -0.00048	    0.00009	    0.00064	    0.00085	    0.00095	  -0.00051	  -0.00125	  -0.00129
                     15	  -0.00186	    0.00026	    0.00234	    0.00039	    0.00034	    0.00019	  -0.00029	  -0.00089	  -0.00184
                     22	  -0.00053	  -0.00026	  -0.00045	  -0.00056	  -0.00026	  -0.00027	  -0.00103	  -0.00108	  -0.00101
                     45	    0.00032	  -0.00022	  -0.00037	  -0.00042	  -0.00015	    0.00021	    0.00026	    0.00035	  -0.00056
                     60	  -0.00011	  -0.00001	   0.00000	  -0.00001	    0.00000	    0.00002	    0.00001	  -0.00004	  -0.00021
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            </tableData>
          </table>
       </product>
    </function>
    <function name="aero/c/CMMDSM">
    <description>PITCHING MOMENT INCREMENT DUE TO SLATS</description>
    <product>
          <property>fcs/slat-pos-deg</property>
          <table>
            <independentVar lookup="row">aero/alpha-deg</independentVar>
            <independentVar lookup="column">aero/beta-deg</independentVar>
            <tableData>
                                -20	        -10	         -5	         -2	          0	          2	          5	         10	         20
                    -10	  -0.27057	  -0.29695	  -0.30420	  -0.30657	  -0.30639	  -0.30657	  -0.30420	  -0.29695	  -0.27057
                      3	  -0.07011	  -0.08343	  -0.09047	  -0.09099	  -0.09039	  -0.09099	  -0.09047	  -0.08343	  -0.07011
                      9	    0.08889	    0.06163	    0.04051	    0.03429	    0.05304	    0.02545	    0.04051	    0.06163	    0.08889
                     15	    0.17812	    0.17995	    0.18302	    0.18410	    0.18651	    0.18410	    0.18302	    0.17995	    0.17812
                     22	    0.17413	    0.20792	    0.22051	    0.23321	    0.23456	    0.23152	    0.22051	    0.20222	    0.17413
                     45	    0.06385	    0.05645	    0.05783	    0.06249	    0.06095	    0.06249	    0.05782	    0.05140	    0.06403
                     60	    0.07164	    0.06579	    0.06250	    0.05952	    0.05838	    0.05952	    0.06250	    0.06579	    0.07164
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            </tableData>
          </table>
       </product>
    </function>
    <function name="aero/c/CMMDSPL">
    <description>PITCHING MOMENT INCREMENT DUE TO SPOILERS LEFT</description>
    <product>
          <table>
            <independentVar lookup="row">aero/alpha-deg</independentVar>
            <independentVar lookup="column">aero/beta-deg</independentVar>
            <independentVar lookup="table">fcs/speedbrake-left-deg</independentVar>
              <tableData breakPoint="0">
                              -20	       -10	        -5	        -2	         0	         2	         5	        10	        20
                    -10	    0.00000	    0.00000	    0.00000	    0.00000	    0.00000	    0.00000	    0.00000	    0.00000	    0.00000
                      3	    0.00000	    0.00000	    0.00000	    0.00000	    0.00000	    0.00000	    0.00000	    0.00000	    0.00000
                      9	    0.00000	    0.00000	    0.00000	    0.00000	    0.00000	    0.00000	    0.00000	    0.00000	    0.00000
                     15	    0.00000	    0.00000	    0.00000	    0.00000	    0.00000	    0.00000	    0.00000	    0.00000	    0.00000
                     22	    0.00000	    0.00000	    0.00000	    0.00000	    0.00000	    0.00000	    0.00000	    0.00000	    0.00000
                     45	    0.00000	    0.00000	    0.00000	    0.00000	    0.00000	    0.00000	    0.00000	    0.00000	    0.00000
                     60	    0.00000	    0.00000	    0.00000	    0.00000	    0.00000	    0.00000	    0.00000	    0.00000	    0.00000
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              </tableData>
              <tableData breakPoint="20">
                              -20	       -10	        -5	        -2	         0	         2	         5	        10	        20
                    -10	    0.08255	    0.07867	    0.07087	    0.06283	    0.05729	    0.05034	    0.03808	    0.01173	  -0.02607
                      3	    0.08325	    0.11689	    0.12907	    0.13948	    0.14539	    0.14239	    0.13010	    0.08874	  -0.01205
                      9	    0.08733	    0.16479	    0.15151	    0.17198	    0.17591	    0.16778	    0.16862	    0.13671	  -0.03546
                     15	    0.10124	    0.10877	    0.10668	    0.10534	    0.09600	    0.08417	    0.05741	  -0.00143	  -0.13806
                     22	    0.04774	    0.04917	    0.04891	    0.04576	    0.03372	    0.02812	    0.02465	  -0.01169	  -0.05667
                     45	    0.00606	    0.00828	    0.00877	    0.00833	    0.00700	    0.00621	    0.00622	    0.00320	    0.01477
                     60	    0.00435	    0.00504	    0.00540	    0.00564	    0.00550	    0.00495	    0.00502	    0.00626	    0.00606
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              </tableData>
              <tableData breakPoint="50">
                              -20	       -10	        -5	        -2	         0	         2	         5	        10	        20
                    -10	    0.10744	    0.10324	    0.09029	    0.07845	    0.06907	    0.05724	    0.03715	  -0.00589	  -0.07622
                      3	    0.13901	    0.19563	    0.21748	    0.23836	    0.25176	    0.24596	    0.21991	    0.14151	  -0.03628
                      9	    0.10814	    0.25312	    0.25287	    0.28496	    0.29413	    0.26003	    0.28104	    0.16026	  -0.06215
                     15	    0.17082	    0.19707	    0.19510	    0.19274	    0.17766	    0.16260	    0.11773	    0.02589	  -0.16204
                     22	    0.10438	    0.10251	    0.09489	    0.08729	    0.06613	    0.05830	    0.05381	  -0.00487	  -0.07985
                     45	    0.01295	    0.01554	    0.01696	    0.01631	    0.01386	    0.01219	    0.01163	    0.01050	    0.02703
                     60	    0.00870	    0.01033	    0.01129	    0.01170	    0.01068	    0.00963	    0.00951	    0.01303	    0.01134
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              </tableData>
          </table>
       </product>
    </function>
    <function name="aero/c/CMMDSPR">
    <description>PITCHING MOMENT INCREMENT DUE TO SPOILERS RIGHT</description>
    <product>
          <table>
            <independentVar lookup="row">aero/alpha-deg</independentVar>
            <independentVar lookup="column">aero/beta-deg</independentVar>
            <independentVar lookup="table">fcs/speedbrake-right-deg</independentVar>
              <tableData breakPoint="0">
                              -20	       -10	        -5	        -2	         0	         2	         5	        10	        20
                    -10	    0.00000	    0.00000	    0.00000	    0.00000	    0.00000	    0.00000	    0.00000	    0.00000	    0.00000
                      3	    0.00000	    0.00000	    0.00000	    0.00000	    0.00000	    0.00000	    0.00000	    0.00000	    0.00000
                      9	    0.00000	    0.00000	    0.00000	    0.00000	    0.00000	    0.00000	    0.00000	    0.00000	    0.00000
                     15	    0.00000	    0.00000	    0.00000	    0.00000	    0.00000	    0.00000	    0.00000	    0.00000	    0.00000
                     22	    0.00000	    0.00000	    0.00000	    0.00000	    0.00000	    0.00000	    0.00000	    0.00000	    0.00000
                     45	    0.00000	    0.00000	    0.00000	    0.00000	    0.00000	    0.00000	    0.00000	    0.00000	    0.00000
                     60	    0.00000	    0.00000	    0.00000	    0.00000	    0.00000	    0.00000	    0.00000	    0.00000	    0.00000
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              </tableData>
              <tableData breakPoint="20">
                              -20	       -10	        -5	        -2	         0	         2	         5	        10	        20
                    -10	  -0.02607	    0.01173	    0.03808	    0.05034	    0.05729	    0.06283	    0.07087	    0.07867	    0.08255
                      3	  -0.01205	    0.08874	    0.13010	    0.14239	    0.14539	    0.13948	    0.12907	    0.11689	    0.08325
                      9	  -0.03546	    0.13671	    0.16862	    0.17662	    0.17591	    0.16314	    0.15151	    0.16479	    0.08733
                     15	  -0.13806	  -0.00143	    0.05741	    0.08417	    0.09600	    0.10534	    0.10668	    0.10877	    0.10124
                     22	  -0.05667	  -0.00599	    0.02465	    0.02981	    0.03372	    0.04407	    0.04891	    0.04347	    0.04774
                     45	    0.01459	    0.00825	    0.00623	    0.00621	    0.00700	    0.00833	    0.00876	    0.00323	    0.00624
                     60	    0.00606	    0.00626	    0.00502	    0.00495	    0.00550	    0.00564	    0.00540	    0.00504	    0.00435
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              </tableData>
              <tableData breakPoint="50">
                              -20	       -10	        -5	        -2	         0	         2	         5	        10	        20
                    -10	  -0.07622	  -0.00589	    0.03715	    0.05724	    0.06907	    0.07845	    0.09029	    0.10324	    0.10744
                      3	  -0.03628	    0.14151	    0.21991	    0.24596	    0.25176	    0.23836	    0.21748	    0.19563	    0.13901
                      9	  -0.06215	    0.16026	    0.28104	    0.26887	    0.29413	    0.27612	    0.25287	    0.25312	    0.10814
                     15	  -0.16204	    0.02589	    0.11773	    0.16260	    0.17766	    0.19274	    0.19510	    0.19707	    0.17082
                     22	  -0.07985	    0.00083	    0.05381	    0.05999	    0.06613	    0.08560	    0.09489	    0.09681	    0.10438
                     45	    0.02685	    0.01555	    0.01164	    0.01219	    0.01386	    0.01631	    0.01695	    0.01049	    0.01313
                     60	    0.01134	    0.01303	    0.00951	    0.00963	    0.01068	    0.01170	    0.01129	    0.01033	    0.00870
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              </tableData>
          </table>
       </product>
    </function>
    <function name="aero/c/CMMQ">
    <description>PITCH DAMPING DERIVATIVE</description>
    <product>
          <property>aero/qb</property>
          <table>
            <independentVar lookup="row">aero/alpha-deg</independentVar>
            <tableData>
                    -10		 -34.66611
                     -5		 -35.80564
                      4		 -37.40664
                     10		 -35.69304
                     16		 -18.46499
                     24		    1.00061
                     50		    4.99441
                     60		    4.71517
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            </tableData>
          </table>
       </product>
    </function>
    <function name="aero/c/CML1">
    <description>BASE ROLLING MOMENT</description>
    <product>
          <table>
            <independentVar lookup="row">aero/alpha-deg</independentVar>
            <independentVar lookup="column">aero/beta-deg</independentVar>
            <tableData>
                                -20	        -10	         -5	         -2	          0	          2	          5	         10	         20
                    -10	    0.00900	    0.00557	    0.00334	    0.00142	    0.00000	  -0.00142	  -0.00334	  -0.00557	  -0.00900
                      3	  -0.04294	  -0.02250	  -0.01113	  -0.00441	    0.00000	    0.00441	    0.01113	    0.02250	    0.04294
                      9	  -0.07572	  -0.04056	  -0.02041	  -0.00797	    0.00000	    0.00800	    0.02041	    0.04056	    0.07572
                     15	  -0.03722	  -0.00732	  -0.00312	  -0.00120	    0.00003	    0.00120	    0.00312	    0.00732	    0.03722
                     22	  -0.01767	  -0.00768	  -0.00357	  -0.00140	    0.00000	    0.00134	    0.00357	    0.00759	    0.01767
                     45	  -0.02610	  -0.01189	  -0.00582	  -0.00233	    0.00000	    0.00233	    0.00582	    0.01195	    0.02638
                     60	  -0.03375	  -0.01558	  -0.00762	  -0.00304	    0.00000	    0.00304	    0.00762	    0.01558	    0.03375
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            </tableData>
          </table>
       </product>
    </function>
    <function name="aero/c/CMLBETADOT">
    <description>ROLL MOMENT DERIVATIVE FOR BETA DOT</description>
    <product>
          <property>aero/betadot-rad_sec</property>
          <table>
            <independentVar lookup="row">aero/alpha-deg</independentVar>
            <tableData>
                    -10		    0.03382
                     -5		  -0.04775
                      4		  -0.13864
                     10		  -0.23718
                     16		  -0.02170
                     24		  -0.04132
                     50		  -0.08102
                     60		  -0.09053
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            </tableData>
          </table>
       </product>
    </function>
    <function name="aero/c/CMLDAD">
    <description>ROLLING MOMENT DUE TO AILERON DEFLECTION</description>
    <product>
          <property>fcs/roll-pos-deg</property>
          <table>
            <independentVar lookup="row">aero/alpha-deg</independentVar>
            <independentVar lookup="column">aero/beta-deg</independentVar>
            <tableData>
                                -20	        -10	         -5	         -2	          0	          2	          5	         10	         20
                    -10	    0.00186	    0.00181	    0.00178	    0.00175	    0.00171	    0.00167	    0.00162	    0.00155	    0.00149
                      3	    0.00170	    0.00192	    0.00202	    0.00207	    0.00211	    0.00213	    0.00211	    0.00206	    0.00190
                      9	    0.00091	    0.00135	    0.00157	    0.00169	    0.00174	    0.00179	    0.00186	    0.00196	    0.00213
                     15	    0.00081	    0.00058	    0.00048	    0.00044	    0.00041	    0.00039	    0.00036	    0.00032	    0.00058
                     22	    0.00015	    0.00005	  -0.00022	    0.00004	    0.00004	    0.00004	    0.00004	    0.00003	    0.00004
                     45	    0.00007	    0.00005	    0.00005	    0.00005	    0.00005	    0.00005	    0.00005	    0.00005	    0.00005
                     60	    0.00004	    0.00004	    0.00004	    0.00004	    0.00004	    0.00003	    0.00003	    0.00003	    0.00003
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            </tableData>
          </table>
       </product>
    </function>
    <function name="aero/c/CMLDFM">
    <description>ROLLING MOMENT INCREMENT DUE TO FLAPS</description>
    <product>
          <property>fcs/flap-pos-deg</property>
          <table>
            <independentVar lookup="row">aero/alpha-deg</independentVar>
            <independentVar lookup="column">aero/beta-deg</independentVar>
            <tableData>
                                -20	        -10	         -5	         -2	          0	          2	          5	         10	         20
                    -10	  -0.01995	  -0.01002	  -0.00498	  -0.00194	    0.00000	    0.00194	    0.00498	    0.01002	    0.01995
                      3	  -0.04399	  -0.02323	  -0.01181	  -0.00465	    0.00000	    0.00465	    0.01181	    0.02323	    0.04399
                      9	    0.01521	    0.02953	    0.01678	    0.00697	    0.00000	  -0.00700	  -0.01678	  -0.02953	  -0.01521
                     15	    0.02024	    0.00133	    0.00053	    0.00014	  -0.00003	  -0.00014	  -0.00053	  -0.00133	  -0.02024
                     22	  -0.00332	  -0.00043	    0.00087	    0.00028	    0.00000	  -0.00022	  -0.00087	    0.00052	    0.00332
                     45	  -0.01146	  -0.00477	  -0.00222	  -0.00087	    0.00000	    0.00087	    0.00222	    0.00471	    0.01118
                     60	  -0.01742	  -0.00817	  -0.00410	  -0.00143	    0.00000	    0.00143	    0.00410	    0.00817	    0.01742
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            </tableData>
          </table>
       </product>
    </function>
    <function name="aero/c/CMLDRD">
    <description>ROLLING MOMENT DUE TO RUDDER DEFLECTION</description>
    <product>
          <property>fcs/rudder-pos-deg</property>
          <table>
            <independentVar lookup="row">aero/alpha-deg</independentVar>
            <independentVar lookup="column">aero/beta-deg</independentVar>
            <tableData>
                                -20	        -10	         -5	         -2	          0	          2	          5	         10	         20
                    -10	    0.00003	    0.00029	    0.00035	    0.00033	    0.00034	    0.00037	    0.00033	    0.00037	    0.00037
                      3	    0.00006	    0.00031	    0.00032	    0.00029	    0.00028	    0.00026	    0.00028	    0.00031	    0.00034
                      9	    0.00007	    0.00027	    0.00021	    0.00019	    0.00019	    0.00018	    0.00020	    0.00024	    0.00032
                     15	    0.00009	    0.00022	    0.00018	    0.00018	    0.00017	    0.00016	    0.00016	    0.00019	    0.00025
                     22	    0.00015	    0.00018	    0.00013	    0.00011	    0.00011	    0.00011	    0.00013	    0.00016	    0.00022
                     45	    0.00006	    0.00005	    0.00005	    0.00005	    0.00005	    0.00004	    0.00005	    0.00006	    0.00007
                     60	   0.00000	   0.00000	    0.00000	    0.00000	    0.00000	    0.00000	    0.00000	    0.00000	    0.00001
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            </tableData>
          </table>
       </product>
    </function>
    <function name="aero/c/CMLDSM">
    <description>ROLLING MOMENT INCREMENT DUE TO SLATS</description>
    <product>
          <property>fcs/slat-pos-deg</property>
          <table>
            <independentVar lookup="row">aero/alpha-deg</independentVar>
            <independentVar lookup="column">aero/beta-deg</independentVar>
            <tableData>
                                -20	        -10	         -5	         -2	          0	          2	          5	         10	         20
                    -10	  -0.01394	  -0.00704	  -0.00354	  -0.00140	    0.00000	    0.00140	    0.00354	    0.00704	    0.01394
                      3	  -0.03476	  -0.01844	  -0.00945	  -0.00373	    0.00000	    0.00373	    0.00945	    0.01844	    0.03476
                      9	  -0.00998	  -0.00035	    0.00010	    0.00071	    0.00000	  -0.00074	  -0.00010	    0.00035	    0.00998
                     15	    0.00845	    0.00030	  -0.00002	  -0.00007	  -0.00003	    0.00007	    0.00002	  -0.00030	  -0.00845
                     22	  -0.00487	  -0.00188	  -0.00057	  -0.00019	    0.00000	    0.00025	    0.00057	    0.00197	    0.00487
                     45	  -0.01211	  -0.00533	  -0.00265	  -0.00107	    0.00000	    0.00107	    0.00265	    0.00527	    0.01183
                     60	  -0.01596	  -0.00749	  -0.00365	  -0.00143	    0.00000	    0.00143	    0.00365	    0.00749	    0.01596
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            </tableData>
          </table>
       </product>
    </function>
    <function name="aero/c/CMLDSPL">
    <description>ROLLING MOMENT INCREMENT DUE TO SPOILERS LEFT</description>
    <product>
          <table>
            <independentVar lookup="row">aero/alpha-deg</independentVar>
            <independentVar lookup="column">aero/beta-deg</independentVar>
            <independentVar lookup="table">fcs/speedbrake-left-deg</independentVar>
              <tableData breakPoint="0">
                              -20	       -10	        -5	        -2	         0	         2	         5	        10	        20
                    -10	    0.00000	    0.00000	    0.00000	    0.00000	    0.00000	    0.00000	    0.00000	    0.00000	    0.00000
                      3	    0.00000	    0.00000	    0.00000	    0.00000	    0.00000	    0.00000	    0.00000	    0.00000	    0.00000
                      9	    0.00000	    0.00000	    0.00000	    0.00000	    0.00000	    0.00000	    0.00000	    0.00000	    0.00000
                     15	    0.00000	    0.00000	    0.00000	    0.00000	    0.00000	    0.00000	    0.00000	    0.00000	    0.00000
                     22	    0.00000	    0.00000	    0.00000	    0.00000	    0.00000	    0.00000	    0.00000	    0.00000	    0.00000
                     45	    0.00000	    0.00000	    0.00000	    0.00000	    0.00000	    0.00000	    0.00000	    0.00000	    0.00000
                     60	    0.00000	    0.00000	    0.00000	    0.00000	    0.00000	    0.00000	    0.00000	    0.00000	    0.00000
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              </tableData>
              <tableData breakPoint="20">
                              -20	       -10	        -5	        -2	         0	         2	         5	        10	        20
                    -10	  -0.02933	  -0.02533	  -0.02324	  -0.02199	  -0.02142	  -0.02111	  -0.02100	  -0.02221	  -0.03036
                      3	  -0.02670	  -0.03556	  -0.03996	  -0.04233	  -0.04389	  -0.04512	  -0.04649	  -0.04813	  -0.05029
                      9	  -0.02833	  -0.03950	  -0.04471	  -0.04795	  -0.05001	  -0.05138	  -0.05323	  -0.05489	  -0.05883
                     15	  -0.03305	  -0.02868	  -0.02278	  -0.01976	  -0.01790	  -0.01617	  -0.01373	  -0.01070	  -0.00783
                     22	  -0.00168	  -0.00135	  -0.00106	  -0.00078	  -0.00062	  -0.00040	  -0.00062	  -0.00020	  -0.00117
                     45	  -0.00213	  -0.00167	  -0.00159	  -0.00157	  -0.00153	  -0.00152	  -0.00152	  -0.00155	  -0.00153
                     60	  -0.00152	  -0.00141	  -0.00140	  -0.00137	  -0.00134	  -0.00133	  -0.00131	  -0.00128	  -0.00139
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              </tableData>
              <tableData breakPoint="50">
                              -20	       -10	        -5	        -2	         0	         2	         5	        10	        20
                    -10	  -0.03370	  -0.02806	  -0.02493	  -0.02373	  -0.02306	  -0.02253	  -0.02201	  -0.02301	  -0.03199
                      3	  -0.04499	  -0.05997	  -0.06714	  -0.07129	  -0.07393	  -0.07593	  -0.07805	  -0.08042	  -0.08392
                      9	  -0.04658	  -0.06589	  -0.07467	  -0.07992	  -0.08327	  -0.08554	  -0.08855	  -0.09164	  -0.09783
                     15	  -0.05596	  -0.05864	  -0.05342	  -0.05179	  -0.05079	  -0.04963	  -0.04803	  -0.04590	  -0.04363
                     22	  -0.02165	  -0.00750	  -0.00307	  -0.00153	  -0.00126	  -0.00099	  -0.00096	  -0.00088	  -0.00215
                     45	  -0.00381	  -0.00312	  -0.00294	  -0.00286	  -0.00280	  -0.00276	  -0.00272	  -0.00272	  -0.00270
                     60	  -0.00306	  -0.00279	  -0.00273	  -0.00265	  -0.00260	  -0.00256	  -0.00251	  -0.00242	  -0.00260
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              </tableData>
          </table>
       </product>
    </function>
    <function name="aero/c/CMLDSPR">
    <description>ROLLING MOMENT INCREMENT DUE TO SPOILERS RIGHT</description>
    <product>
          <table>
            <independentVar lookup="row">aero/alpha-deg</independentVar>
            <independentVar lookup="column">aero/beta-deg</independentVar>
            <independentVar lookup="table">fcs/speedbrake-right-deg</independentVar>
              <tableData breakPoint="0">
                              -20	       -10	        -5	        -2	         0	         2	         5	        10	        20
                    -10	    0.00000	    0.00000	    0.00000	    0.00000	    0.00000	    0.00000	    0.00000	    0.00000	    0.00000
                      3	    0.00000	    0.00000	    0.00000	    0.00000	    0.00000	    0.00000	    0.00000	    0.00000	    0.00000
                      9	    0.00000	    0.00000	    0.00000	    0.00000	    0.00000	    0.00000	    0.00000	    0.00000	    0.00000
                     15	    0.00000	    0.00000	    0.00000	    0.00000	    0.00000	    0.00000	    0.00000	    0.00000	    0.00000
                     22	    0.00000	    0.00000	    0.00000	    0.00000	    0.00000	    0.00000	    0.00000	    0.00000	    0.00000
                     45	    0.00000	    0.00000	    0.00000	    0.00000	    0.00000	    0.00000	    0.00000	    0.00000	    0.00000
                     60	    0.00000	    0.00000	    0.00000	    0.00000	    0.00000	    0.00000	    0.00000	    0.00000	    0.00000
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              </tableData>
              <tableData breakPoint="20">
                              -20	       -10	        -5	        -2	         0	         2	         5	        10	        20
                    -10	    0.03036	    0.02221	    0.02100	    0.02111	    0.02142	    0.02199	    0.02324	    0.02533	    0.02933
                      3	    0.05029	    0.04813	    0.04649	    0.04512	    0.04389	    0.04233	    0.03996	    0.03556	    0.02670
                      9	    0.05883	    0.05489	    0.05323	    0.05135	    0.05001	    0.04792	    0.04471	    0.03950	    0.02833
                     15	    0.00783	    0.01070	    0.01373	    0.01617	    0.01784	    0.01976	    0.02278	    0.02868	    0.03305
                     22	    0.00117	    0.00029	    0.00062	    0.00046	    0.00062	    0.00084	    0.00106	    0.00144	    0.00168
                     45	    0.00125	    0.00149	    0.00152	    0.00152	    0.00153	    0.00157	    0.00159	    0.00161	    0.00185
                     60	    0.00139	    0.00128	    0.00131	    0.00133	    0.00134	    0.00137	    0.00140	    0.00141	    0.00152
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              </tableData>
              <tableData breakPoint="50">
                              -20	       -10	        -5	        -2	         0	         2	         5	        10	        20
                    -10	    0.03199	    0.02301	    0.02201	    0.02253	    0.02306	    0.02373	    0.02493	    0.02806	    0.03370
                      3	    0.08392	    0.08042	    0.07805	    0.07593	    0.07393	    0.07129	    0.06714	    0.05997	    0.04499
                      9	    0.09783	    0.09164	    0.08855	    0.08551	    0.08327	    0.07989	    0.07467	    0.06589	    0.04658
                     15	    0.04363	    0.04590	    0.04803	    0.04963	    0.05073	    0.05179	    0.05342	    0.05864	    0.05596
                     22	    0.00215	    0.00097	    0.00096	    0.00105	    0.00126	    0.00159	    0.00307	    0.00759	    0.02165
                     45	    0.00242	    0.00266	    0.00272	    0.00276	    0.00280	    0.00286	    0.00294	    0.00306	    0.00353
                     60	    0.00260	    0.00242	    0.00251	    0.00256	    0.00260	    0.00265	    0.00273	    0.00279	    0.00306
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              </tableData>
          </table>
       </product>
    </function>
    <function name="aero/c/CMLP">
    <description>ROLL DAMPING DERIVATIVE</description>
    <product>
          <property>aero/pb</property>
          <table>
            <independentVar lookup="row">aero/alpha-deg</independentVar>
            <tableData>
                    -10		  -0.53052
                     -5		  -0.69124
                      4		  -0.66390
                     10		  -0.49460
                     16		  -0.09314
                     24		    0.05916
                     50		    0.07611
                     60		    0.06189
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            </tableData>
          </table>
       </product>
    </function>
    <function name="aero/c/CMLR">
    <description>ROLLING MOMENT DUE TO YAW RATE</description>
    <product>
          <property>aero/rb</property>
          <table>
            <independentVar lookup="row">aero/alpha-deg</independentVar>
            <tableData>
                    -10		  -0.13419
                     -5		  -0.02369
                      4		    0.12520
                     10		    0.23710
                     16		    0.05713
                     24		    0.06082
                     50		    0.12306
                     60		    0.14221
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            </tableData>
          </table>
       </product>
    </function>
    <function name="aero/c/CFYB">
    <description>BASE SIDEFORCE</description>
    <product>
          <table>
            <independentVar lookup="row">aero/alpha-deg</independentVar>
            <independentVar lookup="column">aero/beta-deg</independentVar>
            <independentVar lookup="table">fcs/pitch-pos-deg</independentVar>
              <tableData breakPoint="-17">
                              -20	       -10	        -5	        -2	         0	         2	         5	        10	        20
                    -10	  -0.13331	  -0.04377	  -0.03048	  -0.01129	    0.00000	    0.01128	    0.03048	    0.05695	    0.13345
                      3	  -0.14986	  -0.07662	  -0.03746	  -0.01430	    0.00000	    0.01430	    0.03704	    0.07662	    0.14986
                      9	  -0.15142	  -0.07627	  -0.03953	  -0.01365	    0.00000	    0.01364	    0.03952	    0.07627	    0.15142
                     15	  -0.15606	  -0.08287	  -0.04038	  -0.01249	    0.00000	    0.01254	    0.04038	    0.08292	    0.15605
                     22	  -0.14048	  -0.07018	  -0.03129	  -0.01147	    0.00000	    0.01147	    0.03134	    0.07023	    0.14048
                     45	  -0.08818	  -0.03895	  -0.01601	  -0.00519	  -0.00003	    0.00519	    0.01601	    0.03895	    0.08818
                     60	  -0.02511	  -0.01432	  -0.00574	  -0.00208	  -0.00114	    0.00192	    0.00574	    0.01381	    0.02511
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              </tableData>
              <tableData breakPoint="-15">
                              -20	       -10	        -5	        -2	         0	         2	         5	        10	        20
                    -10	  -0.13292	  -0.05993	  -0.03055	  -0.01130	  -0.00015	    0.01130	    0.03055	    0.05993	    0.13292
                      3	  -0.15007	  -0.07668	  -0.03722	  -0.01413	    0.00000	    0.01418	    0.03722	    0.07704	    0.15007
                      9	  -0.15158	  -0.07548	  -0.04077	  -0.01364	    0.00000	    0.01364	    0.03930	    0.07548	    0.15158
                     15	  -0.15550	  -0.08215	  -0.04028	  -0.01253	    0.01677	    0.01252	    0.04028	    0.08220	    0.15551
                     22	  -0.13976	  -0.06982	  -0.03124	  -0.01141	    0.00000	    0.01141	    0.03123	    0.06982	    0.13976
                     45	  -0.08800	  -0.03868	  -0.01593	  -0.00519	    0.00000	    0.00515	    0.01589	    0.03868	    0.08800
                     60	  -0.02957	  -0.01370	  -0.00577	  -0.00206	    0.00002	    0.00206	    0.00568	    0.01370	    0.02480
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              </tableData>
              <tableData breakPoint="-10">
                              -20	       -10	        -5	        -2	         0	         2	         5	        10	        20
                    -10	  -0.13356	  -0.06064	  -0.03074	  -0.01133	    0.00000	    0.01133	    0.03070	    0.06064	    0.13356
                      3	  -0.15038	  -0.07814	  -0.03654	  -0.01383	    0.00000	    0.01383	    0.03654	    0.07814	    0.15038
                      9	  -0.15234	  -0.07311	  -0.03858	  -0.02061	  -0.00133	    0.01355	    0.03866	    0.07310	    0.15223
                     15	  -0.15390	  -0.08022	  -0.03953	  -0.01259	    0.00000	    0.01258	    0.03952	    0.08022	    0.15390
                     22	  -0.13847	  -0.06867	  -0.03041	  -0.01125	    0.00000	    0.01125	    0.03042	    0.06607	    0.13847
                     45	  -0.08687	  -0.04096	  -0.01559	  -0.00505	    0.00000	    0.00505	    0.01559	    0.03804	    0.08687
                     60	  -0.02439	  -0.01344	  -0.00553	  -0.00200	    0.00000	    0.00200	    0.00553	    0.01344	    0.02439
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              </tableData>
              <tableData breakPoint="-5">
                              -20	       -10	        -5	        -2	         0	         2	         5	        10	        20
                    -10	  -0.13501	  -0.06144	  -0.03076	  -0.01136	  -0.01612	    0.01136	    0.03076	    0.06144	    0.13502
                      3	  -0.15057	  -0.07849	  -0.03644	  -0.01357	    0.00000	    0.01357	    0.03586	    0.07849	    0.15057
                      9	  -0.15317	  -0.07132	  -0.03783	  -0.01351	    0.00000	    0.01351	    0.03783	    0.07132	    0.15317
                     15	  -0.15194	  -0.07825	  -0.03876	  -0.01262	    0.00000	    0.01262	    0.03876	    0.07825	    0.15194
                     22	  -0.13697	  -0.06850	  -0.03025	  -0.01106	    0.00000	    0.01106	    0.03025	    0.06738	    0.13697
                     45	  -0.08557	  -0.03741	  -0.01530	  -0.00126	    0.00000	    0.00496	    0.01530	    0.03741	    0.08557
                     60	  -0.02385	  -0.01318	  -0.00537	  -0.00194	    0.00000	    0.00194	    0.00539	    0.00148	    0.02519
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              </tableData>
              <tableData breakPoint="0">
                              -20	       -10	        -5	        -2	         0	         2	         5	        10	        20
                    -10	  -0.13601	  -0.06279	  -0.03094	  -0.01139	    0.00000	    0.01139	    0.03098	    0.06279	    0.13601
                      3	  -0.15050	  -0.08057	  -0.03517	  -0.01333	    0.00000	    0.01333	    0.03517	    0.08049	    0.15050
                      9	  -0.15347	  -0.07002	  -0.03697	  -0.01344	  -0.00007	    0.01344	    0.03697	    0.07002	    0.15347
                     15	  -0.14965	  -0.07595	  -0.03797	  -0.01272	    0.00000	    0.01272	    0.03797	    0.07594	    0.14965
                     22	  -0.13637	  -0.06772	  -0.03078	  -0.01085	    0.00000	    0.00882	    0.03084	    0.06788	    0.13637
                     45	  -0.08472	  -0.03687	  -0.01508	  -0.00489	    0.00000	    0.00492	    0.01508	    0.05059	    0.08487
                     60	  -0.02473	  -0.01301	  -0.00105	  -0.00189	    0.00002	    0.00189	    0.00526	    0.01300	    0.02473
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              </tableData>
              <tableData breakPoint="5">
                              -20	       -10	        -5	        -2	         0	         2	         5	        10	        20
                    -10	  -0.13686	  -0.06289	  -0.03111	  -0.01115	    0.00000	    0.01140	    0.03111	    0.06343	    0.13680
                      3	  -0.15001	  -0.08094	  -0.03447	  -0.01313	    0.00000	    0.01313	    0.03447	    0.08094	    0.15001
                      9	  -0.15328	  -0.06889	  -0.03582	  -0.01340	    0.00000	    0.01340	    0.03602	    0.06201	    0.15328
                     15	  -0.14800	  -0.04134	  -0.03730	  -0.01280	    0.00000	    0.01280	    0.03719	    0.07350	    0.14792
                     22	  -0.13594	  -0.06859	  -0.03176	  -0.01126	    0.00000	    0.01122	    0.03176	    0.06905	    0.13605
                     45	  -0.08392	  -0.03639	  -0.01485	  -0.00483	    0.00000	    0.00482	    0.01485	    0.03639	    0.08392
                     60	  -0.02404	  -0.01286	  -0.00517	  -0.00181	    0.00000	    0.00020	    0.00517	    0.01281	    0.02447
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              </tableData>
              <tableData breakPoint="10">
                              -20	       -10	        -5	        -2	         0	         2	         5	        10	        20
                    -10	  -0.13815	  -0.06398	  -0.03118	  -0.01142	    0.00000	    0.01141	    0.03117	    0.06398	    0.13769
                      3	  -0.14941	  -0.08086	  -0.03382	  -0.01296	    0.00000	    0.01297	    0.03382	    0.08086	    0.14941
                      9	  -0.15296	  -0.06915	  -0.03521	  -0.01332	    0.00000	    0.01332	    0.03514	    0.06915	    0.15575
                     15	  -0.14627	  -0.07130	  -0.03652	  -0.01283	    0.00000	    0.01283	    0.03651	    0.07130	    0.14627
                     22	  -0.14104	  -0.06906	  -0.03218	  -0.01098	    0.00000	    0.01097	    0.03218	    0.06906	    0.13581
                     45	  -0.08323	  -0.03600	  -0.01466	  -0.00476	    0.00000	    0.00476	    0.01466	    0.03600	    0.08322
                     60	  -0.02421	  -0.01274	  -0.00509	  -0.00181	    0.00000	    0.00182	    0.00509	    0.01274	    0.02419
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              </tableData>
              <tableData breakPoint="15">
                              -20	       -10	        -5	        -2	         0	         2	         5	        10	        20
                    -10	  -0.13807	  -0.06405	  -0.03120	  -0.01142	    0.00000	    0.00747	    0.03119	    0.06393	    0.13807
                      3	  -0.14869	  -0.08059	  -0.03321	  -0.01285	    0.00000	    0.01285	    0.03321	    0.08059	    0.14878
                      9	  -0.15225	  -0.06819	  -0.03432	  -0.01356	    0.00000	    0.01207	    0.04075	    0.06828	    0.15230
                     15	  -0.14512	  -0.07025	  -0.03604	  -0.01292	    0.00000	    0.01288	    0.03605	    0.07020	    0.14269
                     22	  -0.13539	  -0.06893	  -0.03206	  -0.01080	    0.00136	    0.01186	    0.03206	    0.06600	    0.13539
                     45	  -0.08281	  -0.04365	  -0.01450	  -0.00471	    0.00000	    0.00471	    0.00833	    0.03567	    0.08281
                     60	  -0.02440	  -0.01266	  -0.00508	  -0.00181	    0.00000	    0.00180	    0.00508	    0.01266	    0.02399
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              </tableData>
              <tableData breakPoint="20">
                              -20	       -10	        -5	        -2	         0	         2	         5	        10	        20
                    -10	  -0.13816	  -0.06385	  -0.03148	  -0.01148	    0.00000	    0.01148	    0.03148	    0.06385	    0.13775
                      3	  -0.14822	  -0.08027	  -0.03274	  -0.01278	    0.00000	    0.01279	    0.03263	    0.08027	    0.14822
                      9	  -0.15165	  -0.06491	  -0.03338	  -0.01306	    0.00003	    0.01306	    0.03338	    0.06491	    0.15193
                     15	  -0.14401	  -0.06939	  -0.03874	  -0.01283	    0.00000	    0.01293	    0.03562	    0.06939	    0.14389
                     22	  -0.13479	  -0.06902	  -0.03279	  -0.01102	    0.00000	    0.01102	    0.03279	    0.06900	    0.14020
                     45	  -0.08239	  -0.03555	  -0.01423	  -0.00461	    0.00154	    0.00461	    0.01423	    0.03542	    0.08239
                     60	  -0.02825	  -0.01259	  -0.00511	  -0.00178	  -0.00019	    0.00179	    0.00508	    0.01262	    0.02390
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              </tableData>
              <tableData breakPoint="25">
                              -20	       -10	        -5	        -2	         0	         2	         5	        10	        20
                    -10	  -0.13822	  -0.06402	  -0.03150	  -0.01149	    0.00000	    0.01189	    0.03150	    0.06401	    0.13822
                      3	  -0.14752	  -0.08013	  -0.03230	  -0.01275	    0.00000	    0.01275	    0.03230	    0.08013	    0.14743
                      9	  -0.15192	  -0.06200	  -0.03256	  -0.01291	    0.00000	    0.01291	    0.03256	    0.06583	    0.15192
                     15	  -0.14314	  -0.06885	  -0.03507	  -0.01290	    0.00000	    0.01192	    0.04292	    0.06886	    0.14312
                     22	  -0.13360	  -0.12478	  -0.03344	  -0.01162	  -0.00007	    0.01162	    0.03346	    0.06911	    0.13397
                     45	  -0.08200	  -0.03518	  -0.01408	  -0.00456	    0.00000	    0.00456	    0.01408	    0.03523	    0.08200
                     60	  -0.02388	  -0.01256	  -0.00507	  -0.00178	    0.00000	    0.00178	    0.00507	    0.01256	    0.02388
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              </tableData>
              <tableData breakPoint="30">
                              -20	       -10	        -5	        -2	         0	         2	         5	        10	        20
                    -10	  -0.13820	  -0.06405	  -0.03138	  -0.01156	    0.00000	  -0.00282	    0.03138	    0.06376	    0.13821
                      3	  -0.14680	  -0.08011	  -0.03189	  -0.01273	    0.00000	    0.01273	    0.03408	    0.08011	    0.14680
                      9	  -0.15170	  -0.06483	  -0.03167	  -0.01274	    0.00000	    0.01275	    0.03167	    0.06470	    0.15170
                     15	  -0.14250	  -0.06835	  -0.03470	  -0.01289	    0.00000	    0.01876	    0.03470	    0.06835	    0.14250
                     22	  -0.13610	  -0.06920	  -0.03395	  -0.01213	    0.00001	    0.01213	    0.03401	    0.06920	    0.11335
                     45	  -0.08162	  -0.03497	  -0.01403	  -0.00461	    0.00000	    0.00461	    0.00693	    0.03497	    0.08183
                     60	  -0.02388	  -0.01254	  -0.00509	  -0.00179	    0.00000	    0.00178	    0.00509	    0.01254	    0.02388
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              </tableData>
          </table>
       </product>
    </function>
    <function name="aero/c/CFYDFM">
    <description>SIDEFORCE INCREMENT DUE TO FLAPS</description>
    <product>
          <property>fcs/flap-pos-deg</property>
          <table>
            <independentVar lookup="row">aero/alpha-deg</independentVar>
            <independentVar lookup="column">aero/beta-deg</independentVar>
            <tableData>
                                -20	        -10	         -5	         -2	          0	          2	          5	         10	         20
                    -10	    0.00492	    0.01055	    0.00454	    0.00163	    0.00000	  -0.00163	  -0.00454	  -0.01055	  -0.00492
                      3	  -0.00801	  -0.01023	    0.00791	    0.00355	    0.00000	  -0.00355	  -0.00791	    0.01023	    0.00801
                      9	  -0.00708	  -0.00597	    0.00730	    0.00891	    0.00000	  -0.00887	  -0.00730	    0.00597	    0.00708
                     15	  -0.00322	    0.00002	    0.00674	    0.00015	    0.00017	  -0.00015	  -0.00674	  -0.00002	    0.00322
                     22	  -0.00967	    0.00262	    0.00121	    0.00073	    0.00000	  -0.00108	  -0.00121	  -0.00385	    0.00967
                     45	  -0.00771	    0.00150	  -0.00266	    0.00004	    0.00000	  -0.00004	    0.00266	    0.00071	    0.01010
                     60	    0.00979	    0.00392	    0.00362	  -0.00126	    0.00000	    0.00126	  -0.00362	  -0.00392	  -0.00979
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            </tableData>
          </table>
       </product>
    </function>
    <function name="aero/c/CFYDSM">
    <description>SIDEFORCE INCREMENT DUE TO SLATS</description>
    <product>
          <property>fcs/slat-pos-deg</property>
          <table>
            <independentVar lookup="row">aero/alpha-deg</independentVar>
            <independentVar lookup="column">aero/beta-deg</independentVar>
            <tableData>
                                -20	        -10	         -5	         -2	          0	          2	          5	         10	         20
                    -10	    0.00442	    0.00532	    0.00216	    0.00111	    0.00000	  -0.00111	  -0.00216	  -0.00532	  -0.00442
                      3	  -0.00101	  -0.00540	    0.00251	    0.00149	    0.00000	  -0.00149	  -0.00251	    0.00540	    0.00101
                      9	  -0.00356	    0.00083	    0.00217	    0.00228	    0.00000	  -0.00224	  -0.00217	  -0.00083	    0.00356
                     15	    0.00006	  -0.00038	    0.00003	  -0.00077	    0.00017	    0.00077	  -0.00003	    0.00038	  -0.00006
                     22	  -0.00124	  -0.00205	    0.00157	    0.00107	    0.00000	  -0.00142	  -0.00157	    0.00082	    0.00124
                     45	  -0.00325	  -0.00357	  -0.00394	    0.00044	    0.00000	  -0.00044	    0.00394	    0.00578	    0.00564
                     60	  -0.00953	  -0.00432	  -0.00238	  -0.00131	  -0.00001	    0.00131	    0.00238	    0.00432	    0.00953
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            </tableData>
          </table>
       </product>
    </function>
    <function name="aero/c/CFYDSPL">
    <description>SIDEFORCE INCREMENT DUE TO SPOILERS LEFT</description>
    <product>
          <table>
            <independentVar lookup="row">aero/alpha-deg</independentVar>
            <independentVar lookup="column">aero/beta-deg</independentVar>
            <independentVar lookup="table">fcs/speedbrake-left-deg</independentVar>
              <tableData breakPoint="0">
                              -20	       -10	        -5	        -2	         0	         2	         5	        10	        20
                    -10	    0.00000	    0.00000	    0.00000	    0.00000	    0.00000	    0.00000	    0.00000	    0.00000	    0.00000
                      3	    0.00000	    0.00000	    0.00000	    0.00000	    0.00000	    0.00000	    0.00000	    0.00000	    0.00000
                      9	    0.00000	    0.00000	    0.00000	    0.00000	    0.00000	    0.00000	    0.00000	    0.00000	    0.00000
                     15	    0.00000	    0.00000	    0.00000	    0.00000	    0.00000	    0.00000	    0.00000	    0.00000	    0.00000
                     22	    0.00000	    0.00000	    0.00000	    0.00000	    0.00000	    0.00000	    0.00000	    0.00000	    0.00000
                     45	    0.00000	    0.00000	    0.00000	    0.00000	    0.00000	    0.00000	    0.00000	    0.00000	    0.00000
                     60	    0.00000	    0.00000	    0.00000	    0.00000	    0.00000	    0.00000	    0.00000	    0.00000	    0.00000
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              </tableData>
              <tableData breakPoint="20">
                              -20	       -10	        -5	        -2	         0	         2	         5	        10	        20
                    -10	    0.00369	  -0.00028	  -0.00107	  -0.00176	  -0.00237	  -0.00222	  -0.00272	  -0.00215	    0.00507
                      3	    0.00125	    0.00272	    0.00381	    0.00422	    0.00399	    0.00353	    0.00086	    0.00474	    0.00873
                      9	    0.00044	    0.00266	    0.00263	    0.00291	    0.00282	    0.00112	  -0.00032	  -0.00536	    0.00107
                     15	    0.00461	    0.00599	    0.00763	    0.01019	    0.01042	    0.00975	    0.00814	    0.00692	    0.00436
                     22	    0.02295	    0.01921	    0.01863	    0.01711	    0.01616	    0.01601	    0.01754	    0.01459	    0.03038
                     45	    0.01524	    0.01303	    0.01303	    0.01352	    0.01356	    0.01307	    0.01320	    0.01592	    0.01233
                     60	    0.00654	    0.00825	    0.00764	    0.00721	    0.00722	    0.00753	    0.00762	    0.00732	    0.00773
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              </tableData>
              <tableData breakPoint="50">
                              -20	       -10	        -5	        -2	         0	         2	         5	        10	        20
                    -10	  -0.00195	  -0.00648	  -0.00777	  -0.00814	  -0.00919	  -0.00882	  -0.00963	  -0.00969	    0.00064
                      3	    0.00030	    0.00112	    0.00529	    0.00604	    0.00543	    0.00426	  -0.00047	    0.00658	    0.01315
                      9	  -0.00146	    0.00273	    0.00263	    0.00320	    0.00257	  -0.00025	  -0.00324	  -0.01106	    0.00222
                     15	    0.00558	    0.00539	    0.00708	    0.01030	    0.01079	    0.01060	    0.00749	    0.00549	    0.00169
                     22	    0.02878	    0.03646	    0.03737	    0.03556	    0.03473	    0.03375	    0.03300	    0.03448	    0.05531
                     45	    0.02766	    0.02486	    0.02491	    0.02541	    0.02519	    0.02442	    0.02485	    0.02802	    0.02319
                     60	    0.01561	    0.01673	    0.01539	    0.01456	    0.01447	    0.01505	    0.01544	    0.01460	    0.01475
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              </tableData>
          </table>
       </product>
    </function>
    <function name="aero/c/CFYDSPR">
    <description>SIDEFORCE INCREMENT DUE TO SPOILERS RIGHT</description>
    <product>
          <table>
            <independentVar lookup="row">aero/alpha-deg</independentVar>
            <independentVar lookup="column">aero/beta-deg</independentVar>
            <independentVar lookup="table">fcs/speedbrake-right-deg</independentVar>
              <tableData breakPoint="0">
                              -20	       -10	        -5	        -2	         0	         2	         5	        10	        20
                    -10	    0.00000	    0.00000	    0.00000	    0.00000	    0.00000	    0.00000	    0.00000	    0.00000	    0.00000
                      3	    0.00000	    0.00000	    0.00000	    0.00000	    0.00000	    0.00000	    0.00000	    0.00000	    0.00000
                      9	    0.00000	    0.00000	    0.00000	    0.00000	    0.00000	    0.00000	    0.00000	    0.00000	    0.00000
                     15	    0.00000	    0.00000	    0.00000	    0.00000	    0.00000	    0.00000	    0.00000	    0.00000	    0.00000
                     22	    0.00000	    0.00000	    0.00000	    0.00000	    0.00000	    0.00000	    0.00000	    0.00000	    0.00000
                     45	    0.00000	    0.00000	    0.00000	    0.00000	    0.00000	    0.00000	    0.00000	    0.00000	    0.00000
                     60	    0.00000	    0.00000	    0.00000	    0.00000	    0.00000	    0.00000	    0.00000	    0.00000	    0.00000
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              </tableData>
              <tableData breakPoint="20">
                              -20	       -10	        -5	        -2	         0	         2	         5	        10	        20
                    -10	  -0.00507	    0.00215	    0.00272	    0.00222	    0.00237	    0.00176	    0.00107	    0.00028	  -0.00369
                      3	  -0.00873	  -0.00474	  -0.00086	  -0.00353	  -0.00399	  -0.00422	  -0.00381	  -0.00272	  -0.00125
                      9	  -0.00107	    0.00536	    0.00032	  -0.00108	  -0.00282	  -0.00287	  -0.00263	  -0.00266	  -0.00044
                     15	  -0.00436	  -0.00692	  -0.00814	  -0.00975	  -0.01008	  -0.01019	  -0.00763	  -0.00599	  -0.00461
                     22	  -0.03038	  -0.01582	  -0.01754	  -0.01636	  -0.01616	  -0.01746	  -0.01863	  -0.02044	  -0.02295
                     45	  -0.00994	  -0.01371	  -0.01320	  -0.01307	  -0.01356	  -0.01352	  -0.01303	  -0.01082	  -0.01285
                     60	  -0.00773	  -0.00732	  -0.00762	  -0.00753	  -0.00722	  -0.00721	  -0.00764	  -0.00825	  -0.00654
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              </tableData>
              <tableData breakPoint="50">
                              -20	       -10	        -5	        -2	         0	         2	         5	        10	        20
                    -10	  -0.00064	    0.00969	    0.00963	    0.00882	    0.00919	    0.00814	    0.00777	    0.00648	    0.00195
                      3	  -0.01315	  -0.00658	    0.00047	  -0.00426	  -0.00543	  -0.00604	  -0.00529	  -0.00112	  -0.00030
                      9	  -0.00222	    0.01106	    0.00324	    0.00029	  -0.00257	  -0.00316	  -0.00263	  -0.00273	    0.00146
                     15	  -0.00169	  -0.00549	  -0.00749	  -0.01060	  -0.01045	  -0.01030	  -0.00708	  -0.00539	  -0.00558
                     22	  -0.05531	  -0.03571	  -0.03300	  -0.03410	  -0.03473	  -0.03591	  -0.03737	  -0.03769	  -0.02878
                     45	  -0.02080	  -0.02581	  -0.02485	  -0.02442	  -0.02519	  -0.02541	  -0.02491	  -0.02265	  -0.02527
                     60	  -0.01475	  -0.01460	  -0.01544	  -0.01505	  -0.01447	  -0.01456	  -0.01539	  -0.01673	  -0.01561
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              </tableData>
          </table>
       </product>
    </function>
    <function name="aero/c/CFYP">
    <description>SIDE FORCE DUE TO ROLL RATE</description>
    <product>
          <property>aero/pb</property>
          <table>
            <independentVar lookup="row">aero/alpha-deg</independentVar>
            <tableData>
                    -10		  -0.37898
                     -5		  -0.34060
                      4		  -0.05657
                     10		    0.07297
                     16		    0.09578
                     24		    0.01875
                     50		  -0.00436
                     60		  -0.05185
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            </tableData>
          </table>
       </product>
    </function>
    <function name="aero/c/CFYR">
    <description>SIDE FORCE DUE TO YAW RATE</description>
    <product>
          <property>aero/rb</property>
          <table>
            <independentVar lookup="row">aero/alpha-deg</independentVar>
            <tableData>
                    -10		    0.38627
                     -5		    0.45401
                      4		    0.44445
                     10		    0.43918
                     16		    0.40486
                     24		    0.50340
                     50		    0.43624
                     60		    0.35563
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            </tableData>
          </table>
       </product>
    </function>
    <function name="aero/c/CYDAD">
    <description>SIDE FORCE DUE TO AILERON DEFLECTION</description>
    <product>
          <property>fcs/roll-pos-deg</property>
          <table>
            <independentVar lookup="row">aero/alpha-deg</independentVar>
            <independentVar lookup="column">aero/beta-deg</independentVar>
            <tableData>
                                -20	        -10	         -5	         -2	          0	          2	          5	         10	         20
                    -10	    0.00040	    0.00037	    0.00038	    0.00037	    0.00035	    0.00034	    0.00031	    0.00031	    0.00032
                      3	    0.00022	    0.00026	    0.00032	    0.00032	    0.00031	    0.00030	    0.00028	    0.00026	    0.00026
                      9	    0.00020	    0.00024	    0.00022	    0.00022	    0.00022	    0.00021	    0.00020	    0.00020	    0.00019
                     15	    0.00021	    0.00030	    0.00032	    0.00033	    0.00036	    0.00036	    0.00035	    0.00036	    0.00032
                     22	    0.00049	    0.00047	  -0.00018	    0.00042	    0.00042	    0.00040	    0.00040	    0.00038	    0.00047
                     45	    0.00040	    0.00028	    0.00027	    0.00027	    0.00027	    0.00026	    0.00026	    0.00036	    0.00034
                     60	    0.00012	    0.00017	    0.00016	    0.00015	    0.00015	    0.00015	    0.00015	    0.00015	    0.00017
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            </tableData>
          </table>
       </product>
    </function>
    <function name="aero/c/CYDRD">
    <description>SIDE FORCE DUE TO RUDDER DEFLECTION</description>
    <product>
          <property>fcs/rudder-pos-deg</property>
          <table>
            <independentVar lookup="row">aero/alpha-deg</independentVar>
            <independentVar lookup="column">aero/beta-deg</independentVar>
            <tableData>
                                -20	        -10	         -5	         -2	          0	          2	          5	         10	         20
                    -10	    0.00109	    0.00294	    0.00313	    0.00316	    0.00370	    0.00381	    0.00387	    0.00394	    0.00389
                      3	    0.00131	    0.00319	    0.00341	    0.00341	    0.00334	    0.00312	    0.00324	    0.00382	    0.00375
                      9	    0.00156	    0.00328	    0.00303	    0.00324	    0.00305	    0.00309	    0.00333	    0.00335	    0.00368
                     15	    0.00178	    0.00294	    0.00321	    0.00206	    0.00197	    0.00214	    0.00294	    0.00290	    0.00321
                     22	    0.00197	    0.00262	    0.00227	    0.00197	    0.00192	    0.00197	    0.00224	    0.00252	    0.00276
                     45	    0.00066	    0.00072	    0.00067	    0.00067	    0.00069	    0.00066	    0.00070	    0.00095	    0.00087
                     60	  -0.00008	  -0.00002	    0.00001	    0.00003	    0.00004	    0.00005	    0.00007	    0.00011	    0.00016
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            </tableData>
          </table>
       </product>
    </function>
    <function name="aero/c/CMN1">
    <description>BASE YAWING MOMENT</description>
    <product>
          <table>
            <independentVar lookup="row">aero/alpha-deg</independentVar>
            <independentVar lookup="column">aero/beta-deg</independentVar>
            <independentVar lookup="table">fcs/pitch-pos-deg</independentVar>
              <tableData breakPoint="-17">
                              -20	       -10	        -5	        -2	         0	         2	         5	        10	        20
                    -10	  -0.01965	  -0.00472	  -0.00267	  -0.00080	    0.00000	    0.00079	    0.00267	    0.00647	    0.01976
                      3	  -0.01337	  -0.00638	  -0.00083	  -0.00002	    0.00000	    0.00002	    0.00070	    0.00638	    0.01337
                      9	  -0.00864	  -0.00298	  -0.00052	  -0.00011	    0.00000	    0.00011	    0.00052	    0.00298	    0.00864
                     15	  -0.01730	  -0.00710	  -0.00192	  -0.00105	    0.00000	    0.00111	    0.00192	    0.00713	    0.01730
                     22	  -0.02440	  -0.00903	  -0.00318	  -0.00102	    0.00000	    0.00102	    0.00320	    0.00905	    0.02440
                     45	  -0.03197	  -0.01371	  -0.00574	  -0.00217	  -0.00001	    0.00217	    0.00574	    0.01371	    0.03197
                     60	  -0.02145	  -0.00967	  -0.00452	  -0.00168	  -0.00003	    0.00162	    0.00452	    0.01035	    0.02145
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              </tableData>
              <tableData breakPoint="-15">
                              -20	       -10	        -5	        -2	         0	         2	         5	        10	        20
                    -10	  -0.01914	  -0.00636	  -0.00259	  -0.00075	  -0.00006	    0.00075	    0.00259	    0.00636	    0.01914
                      3	  -0.01336	  -0.00620	  -0.00077	    0.00007	    0.00000	  -0.00005	    0.00077	    0.00637	    0.01336
                      9	  -0.00860	  -0.00279	  -0.00095	  -0.00009	    0.00000	    0.00009	    0.00049	    0.00279	    0.00860
                     15	  -0.01718	  -0.00699	  -0.00189	  -0.00107	    0.00634	    0.00106	    0.00189	    0.00702	    0.01718
                     22	  -0.02438	  -0.00902	  -0.00325	  -0.00102	    0.00000	    0.00102	    0.00325	    0.00902	    0.02438
                     45	  -0.03195	  -0.01368	  -0.00573	  -0.00217	    0.00000	    0.00216	    0.00572	    0.01368	    0.03195
                     60	  -0.02242	  -0.01037	  -0.00455	  -0.00168	    0.00001	    0.00168	    0.00453	    0.01037	    0.02181
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              </tableData>
              <tableData breakPoint="-10">
                              -20	       -10	        -5	        -2	         0	         2	         5	        10	        20
                    -10	  -0.01857	  -0.00613	  -0.00241	  -0.00067	    0.00000	    0.00067	    0.00239	    0.00613	    0.01857
                      3	  -0.01329	  -0.00642	  -0.00061	    0.00020	    0.00000	  -0.00020	    0.00061	    0.00642	    0.01329
                      9	  -0.00876	  -0.00213	  -0.00035	  -0.00238	  -0.00057	    0.00002	    0.00040	    0.00213	    0.00878
                     15	  -0.01690	  -0.00678	  -0.00182	  -0.00110	    0.00000	    0.00109	    0.00182	    0.00678	    0.01690
                     22	  -0.02466	  -0.00897	  -0.00312	  -0.00101	    0.00000	    0.00101	    0.00312	    0.00806	    0.02466
                     45	  -0.03186	  -0.01484	  -0.00569	  -0.00215	    0.00000	    0.00215	    0.00569	    0.01360	    0.03186
                     60	  -0.02159	  -0.01041	  -0.00454	  -0.00169	    0.00000	    0.00169	    0.00454	    0.01041	    0.02159
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              </tableData>
              <tableData breakPoint="-5">
                              -20	       -10	        -5	        -2	         0	         2	         5	        10	        20
                    -10	  -0.01850	  -0.00600	  -0.00219	  -0.00060	  -0.00314	    0.00060	    0.00219	    0.00600	    0.01850
                      3	  -0.01331	  -0.00619	  -0.00101	    0.00029	    0.00000	  -0.00029	    0.00054	    0.00619	    0.01331
                      9	  -0.00907	  -0.00176	  -0.00030	    0.00002	    0.00000	  -0.00002	    0.00030	    0.00176	    0.00907
                     15	  -0.01666	  -0.00664	  -0.00179	  -0.00113	    0.00000	    0.00113	    0.00179	    0.00664	    0.01666
                     22	  -0.02504	  -0.01010	  -0.00333	  -0.00102	    0.00000	    0.00104	    0.00333	    0.00896	    0.02504
                     45	  -0.03169	  -0.01354	  -0.00566	    0.00005	    0.00000	    0.00214	    0.00566	    0.01354	    0.03169
                     60	  -0.02165	  -0.01044	  -0.00455	  -0.00170	    0.00000	    0.00170	    0.00456	    0.01032	    0.02182
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              </tableData>
              <tableData breakPoint="0">
                              -20	       -10	        -5	        -2	         0	         2	         5	        10	        20
                    -10	  -0.01833	  -0.00616	  -0.00206	  -0.00054	    0.00000	    0.00054	    0.00206	    0.00616	    0.01833
                      3	  -0.01340	  -0.00682	  -0.00054	    0.00035	    0.00000	  -0.00035	    0.00054	    0.00679	    0.01340
                      9	  -0.00934	  -0.00172	  -0.00024	    0.00005	  -0.00004	  -0.00005	    0.00024	    0.00172	    0.00934
                     15	  -0.01646	  -0.00655	  -0.00182	  -0.00122	    0.00000	    0.00122	    0.00182	    0.00655	    0.01646
                     22	  -0.02556	  -0.00986	  -0.00393	  -0.00104	    0.00000	    0.00042	    0.00396	    0.01007	    0.02556
                     45	  -0.03173	  -0.01351	  -0.00564	  -0.00214	    0.00000	    0.00215	    0.00564	    0.01896	    0.03182
                     60	  -0.02188	  -0.01050	  -0.00354	  -0.00170	    0.00000	    0.00170	    0.00458	    0.01050	    0.02188
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              </tableData>
              <tableData breakPoint="5">
                              -20	       -10	        -5	        -2	         0	         2	         5	        10	        20
                    -10	  -0.01827	  -0.00592	  -0.00198	  -0.00037	    0.00000	    0.00048	    0.00197	    0.00610	    0.01824
                      3	  -0.01346	  -0.00678	  -0.00060	    0.00037	    0.00000	  -0.00037	    0.00060	    0.00678	    0.01346
                      9	  -0.00959	  -0.00154	    0.00010	    0.00004	    0.00000	  -0.00004	    0.00023	  -0.00089	    0.00959
                     15	  -0.01673	    0.00860	  -0.00193	  -0.00132	    0.00000	    0.00132	    0.00190	    0.00639	    0.01674
                     22	  -0.02673	  -0.01125	  -0.00495	  -0.00146	    0.00000	    0.00145	    0.00495	    0.01144	    0.02700
                     45	  -0.03175	  -0.01348	  -0.00563	  -0.00214	    0.00000	    0.00214	    0.00563	    0.01348	    0.03175
                     60	  -0.02195	  -0.01099	  -0.00460	  -0.00170	    0.00000	    0.00150	    0.00460	    0.01054	    0.02201
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              </tableData>
              <tableData breakPoint="10">
                              -20	       -10	        -5	        -2	         0	         2	         5	        10	        20
                    -10	  -0.01853	  -0.00613	  -0.00189	  -0.00046	    0.00000	    0.00045	    0.00189	    0.00613	    0.01836
                      3	  -0.01363	  -0.00663	  -0.00072	    0.00035	    0.00000	  -0.00035	    0.00072	    0.00663	    0.01363
                      9	  -0.00992	  -0.00213	  -0.00027	    0.00006	    0.00000	  -0.00006	    0.00026	    0.00213	    0.01122
                     15	  -0.01706	  -0.00636	  -0.00205	  -0.00142	    0.00000	    0.00142	    0.00204	    0.00636	    0.01706
                     22	  -0.03026	  -0.01196	  -0.00529	  -0.00139	    0.00000	    0.00139	    0.00529	    0.01196	    0.02822
                     45	  -0.03178	  -0.01347	  -0.00562	  -0.00213	    0.00000	    0.00213	    0.00562	    0.01347	    0.03177
                     60	  -0.02208	  -0.01061	  -0.00462	  -0.00172	    0.00000	    0.00172	    0.00462	    0.01061	    0.02208
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              </tableData>
              <tableData breakPoint="15">
                              -20	       -10	        -5	        -2	         0	         2	         5	        10	        20
                    -10	  -0.01841	  -0.00609	  -0.00184	  -0.00044	    0.00000	  -0.00225	    0.00184	    0.00599	    0.01841
                      3	  -0.01385	  -0.00648	  -0.00090	    0.00029	    0.00000	  -0.00029	    0.00090	    0.00648	    0.01390
                      9	  -0.01018	  -0.00228	  -0.00031	    0.00018	    0.00000	  -0.00052	    0.00266	    0.00231	    0.01021
                     15	  -0.01766	  -0.00690	  -0.00237	  -0.00159	    0.00000	    0.00157	    0.00237	    0.00688	    0.01652
                     22	  -0.02891	  -0.01218	  -0.00538	  -0.00135	    0.00050	    0.00139	    0.00538	    0.01163	    0.02891
                     45	  -0.03188	  -0.01660	  -0.00562	  -0.00214	    0.00000	    0.00214	    0.00279	    0.01347	    0.03188
                     60	  -0.02248	  -0.01064	  -0.00465	  -0.00232	    0.00000	    0.00173	    0.00465	    0.01064	    0.02213
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              </tableData>
              <tableData breakPoint="20">
                              -20	       -10	        -5	        -2	         0	         2	         5	        10	        20
                    -10	  -0.01846	  -0.00591	  -0.00192	  -0.00045	    0.00000	    0.00045	    0.00192	    0.00591	    0.01791
                      3	  -0.01428	  -0.00637	  -0.00112	    0.00020	    0.00000	  -0.00019	    0.00109	    0.00637	    0.01428
                      9	  -0.01060	  -0.00175	  -0.00033	    0.00005	    0.00001	  -0.00005	    0.00033	    0.00174	    0.01063
                     15	  -0.01816	  -0.00743	  -0.00397	  -0.00165	    0.00000	    0.00170	    0.00267	    0.00743	    0.01813
                     22	  -0.02917	  -0.01245	  -0.00585	  -0.00149	    0.00000	    0.00149	    0.00585	    0.01244	    0.03177
                     45	  -0.03192	  -0.01351	  -0.00559	  -0.00213	  -0.00008	    0.00213	    0.00559	    0.01346	    0.03192
                     60	  -0.02329	  -0.01067	  -0.00469	  -0.00173	  -0.00008	    0.00173	    0.00468	    0.01067	    0.02218
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              </tableData>
              <tableData breakPoint="25">
                              -20	       -10	        -5	        -2	         0	         2	         5	        10	        20
                    -10	  -0.01861	  -0.00599	  -0.00194	  -0.00046	    0.00000	    0.00068	    0.00194	    0.00599	    0.01861
                      3	  -0.01460	  -0.00639	  -0.00138	    0.00009	    0.00000	  -0.00009	    0.00138	    0.00639	    0.01457
                      9	  -0.01115	  -0.00096	  -0.00036	    0.00003	    0.00000	  -0.00003	    0.00036	    0.00224	    0.01115
                     15	  -0.01854	  -0.00780	  -0.00269	  -0.00172	    0.00000	    0.00146	    0.00622	    0.00780	    0.01854
                     22	  -0.02896	  -0.02625	  -0.00626	  -0.00180	    0.00001	    0.00180	    0.00626	    0.01270	    0.02915
                     45	  -0.03193	  -0.01346	  -0.00558	  -0.00213	    0.00000	    0.00213	    0.00558	    0.01346	    0.03193
                     60	  -0.02223	  -0.01068	  -0.00470	  -0.00174	    0.00000	    0.00174	    0.00470	    0.01068	    0.02223
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              </tableData>
              <tableData breakPoint="30">
                              -20	       -10	        -5	        -2	         0	         2	         5	        10	        20
                    -10	  -0.01878	  -0.00699	  -0.00192	  -0.00048	    0.00000	  -0.00271	    0.00192	    0.00695	    0.01878
                      3	  -0.01491	  -0.00647	  -0.00158	  -0.00002	    0.00000	    0.00002	    0.00196	    0.00647	    0.01491
                      9	  -0.01145	  -0.00231	  -0.00031	    0.00006	    0.00000	  -0.00005	    0.00031	    0.00224	    0.01145
                     15	  -0.01878	  -0.00797	  -0.00271	  -0.00174	    0.00000	    0.00509	    0.00271	    0.00797	    0.01878
                     22	  -0.02504	  -0.01292	  -0.00659	  -0.00207	    0.00000	    0.00207	    0.00660	    0.01292	    0.01720
                     45	  -0.03189	  -0.01342	  -0.00559	  -0.00214	    0.00000	    0.00214	    0.00240	    0.01342	    0.03198
                     60	  -0.02225	  -0.01069	  -0.00471	  -0.00174	    0.00000	    0.00174	    0.00471	    0.01069	    0.02225
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              </tableData>
          </table>
       </product>
    </function>
    <function name="aero/c/CMNBETADOT">
    <description>YAW MOMENT DERIVATIVE FOR BETADOT</description>
    <product>
          <property>aero/betadot-rad_sec</property>
          <table>
            <independentVar lookup="row">aero/alpha-deg</independentVar>
            <tableData>
                    -10		  -0.01295
                     -5		  -0.02701
                      4		    0.02342
                     10		    0.02679
                     16		  -0.02521
                     24		  -0.08775
                     50		  -0.05781
                     60		  -0.03917
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            </tableData>
          </table>
       </product>
    </function>
    <function name="aero/c/CMNDAD">
    <description>YAWING MOMENT DUE TO AILERON DEFLECTION</description>
    <product>
          <property>fcs/roll-pos-deg</property>
          <table>
            <independentVar lookup="row">aero/alpha-deg</independentVar>
            <independentVar lookup="column">aero/beta-deg</independentVar>
            <tableData>
                                -20	        -10	         -5	         -2	          0	          2	          5	         10	         20
                    -10	  -0.00028	  -0.00027	  -0.00027	  -0.00027	  -0.00026	  -0.00026	  -0.00025	  -0.00024	  -0.00023
                      3	    0.00005	    0.00006	    0.00006	    0.00006	    0.00006	    0.00007	    0.00007	    0.00008	    0.00008
                      9	    0.00008	    0.00015	    0.00018	    0.00019	    0.00020	    0.00022	    0.00023	    0.00025	    0.00028
                     15	    0.00015	    0.00006	    0.00003	    0.00002	    0.00001	   0.00000	   0.00000	  -0.00001	    0.00008
                     22	  -0.00011	  -0.00012	    0.00022	  -0.00011	  -0.00011	  -0.00009	  -0.00010	  -0.00008	  -0.00010
                     45	  -0.00010	  -0.00006	  -0.00006	  -0.00006	  -0.00006	  -0.00006	  -0.00006	  -0.00008	  -0.00008
                     60	  -0.00001	  -0.00002	  -0.00002	  -0.00002	  -0.00002	  -0.00002	  -0.00002	  -0.00002	  -0.00002
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            </tableData>
          </table>
       </product>
    </function>
    <function name="aero/c/CMNDFM">
    <description>YAWING MOMENT INCREMENT DUE TO FLAPS</description>
    <product>
          <property>fcs/flap-pos-deg</property>
          <table>
            <independentVar lookup="row">aero/alpha-deg</independentVar>
            <independentVar lookup="column">aero/beta-deg</independentVar>
            <tableData>
                                -20	        -10	         -5	         -2	          0	          2	          5	         10	         20
                    -10	    0.00172	    0.00195	    0.00116	    0.00059	    0.00000	  -0.00059	  -0.00116	  -0.00195	  -0.00172
                      3	    0.00145	    0.00013	    0.00452	    0.00182	    0.00000	  -0.00182	  -0.00452	  -0.00013	  -0.00145
                      9	    0.00815	    0.00552	    0.00726	    0.00351	    0.00000	  -0.00343	  -0.00726	  -0.00552	  -0.00815
                     15	    0.01544	    0.00690	    0.00506	    0.00109	    0.00006	  -0.00109	  -0.00506	  -0.00690	  -0.01544
                     22	    0.01134	    0.00678	    0.00268	    0.00155	    0.00000	  -0.00190	  -0.00268	  -0.00739	  -0.01134
                     45	    0.01382	    0.00736	    0.00318	    0.00138	    0.00000	  -0.00138	  -0.00318	  -0.00675	  -0.01283
                     60	    0.01736	    0.00903	    0.00517	    0.00150	    0.00000	  -0.00150	  -0.00517	  -0.00903	  -0.01736
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            </tableData>
          </table>
       </product>
    </function>
    <function name="aero/c/CMNDRD">
    <description>YAWING MOMENT DUE TO RUDDER DEFLECTION</description>
    <product>
          <property>fcs/rudder-pos-deg</property>
          <table>
            <independentVar lookup="row">aero/alpha-deg</independentVar>
            <independentVar lookup="column">aero/beta-deg</independentVar>
            <tableData>
                                -20	        -10	         -5	         -2	          0	          2	          5	         10	         20
                    -10	  -0.00056	  -0.00141	  -0.00148	  -0.00146	  -0.00171	  -0.00161	  -0.00174	  -0.00180	  -0.00180
                      3	  -0.00069	  -0.00153	  -0.00165	  -0.00165	  -0.00155	  -0.00149	  -0.00154	  -0.00176	  -0.00177
                      9	  -0.00077	  -0.00158	  -0.00136	  -0.00148	  -0.00144	  -0.00138	  -0.00146	  -0.00156	  -0.00170
                     15	  -0.00085	  -0.00138	  -0.00144	  -0.00132	  -0.00131	  -0.00131	  -0.00127	  -0.00132	  -0.00150
                     22	  -0.00098	  -0.00122	  -0.00113	  -0.00104	  -0.00103	  -0.00103	  -0.00110	  -0.00115	  -0.00128
                     45	  -0.00032	  -0.00033	  -0.00031	  -0.00031	  -0.00032	  -0.00031	  -0.00033	  -0.00042	  -0.00042
                     60	    0.00004	    0.00001	  -0.00001	  -0.00001	  -0.00002	  -0.00002	  -0.00003	  -0.00005	  -0.00008
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            </tableData>
          </table>
       </product>
    </function>
    <function name="aero/c/CMNDSM">
    <description>YAWING MOMENT INCREMENT DUE TO SLATS</description>
    <product>
          <property>fcs/slat-pos-deg</property>
          <table>
            <independentVar lookup="row">aero/alpha-deg</independentVar>
            <independentVar lookup="column">aero/beta-deg</independentVar>
            <tableData>
                                -20	        -10	         -5	         -2	          0	          2	          5	         10	         20
                    -10	  -0.00008	    0.00069	    0.00031	    0.00022	    0.00000	  -0.00022	  -0.00031	  -0.00069	    0.00008
                      3	    0.00006	  -0.00056	    0.00213	    0.00094	    0.00000	  -0.00094	  -0.00213	    0.00056	  -0.00006
                      9	    0.00317	    0.00139	    0.00169	    0.00125	    0.00000	  -0.00117	  -0.00169	  -0.00139	  -0.00317
                     15	    0.01160	    0.00405	    0.00169	    0.00073	    0.00006	  -0.00073	  -0.00169	  -0.00405	  -0.01160
                     22	    0.00709	    0.00339	    0.00259	    0.00118	    0.00000	  -0.00153	  -0.00259	  -0.00400	  -0.00709
                     45	    0.01059	    0.00447	    0.00205	    0.00109	    0.00000	  -0.00109	  -0.00205	  -0.00386	  -0.00960
                     60	    0.00894	    0.00425	    0.00221	    0.00083	    0.00000	  -0.00083	  -0.00221	  -0.00425	  -0.00894
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            </tableData>
          </table>
       </product>
    </function>
    <function name="aero/c/CMNDSPL">
    <description>YAWING MOMENT INCREMENT DUE TO SPOILERS LEFT</description>
    <product>
          <table>
            <independentVar lookup="row">aero/alpha-deg</independentVar>
            <independentVar lookup="column">aero/beta-deg</independentVar>
            <independentVar lookup="table">fcs/speedbrake-left-deg</independentVar>
              <tableData breakPoint="0">
                              -20	       -10	        -5	        -2	         0	         2	         5	        10	        20
                    -10	    0.00000	    0.00000	    0.00000	    0.00000	    0.00000	    0.00000	    0.00000	    0.00000	    0.00000
                      3	    0.00000	    0.00000	    0.00000	    0.00000	    0.00000	    0.00000	    0.00000	    0.00000	    0.00000
                      9	    0.00000	    0.00000	    0.00000	    0.00000	    0.00000	    0.00000	    0.00000	    0.00000	    0.00000
                     15	    0.00000	    0.00000	    0.00000	    0.00000	    0.00000	    0.00000	    0.00000	    0.00000	    0.00000
                     22	    0.00000	    0.00000	    0.00000	    0.00000	    0.00000	    0.00000	    0.00000	    0.00000	    0.00000
                     45	    0.00000	    0.00000	    0.00000	    0.00000	    0.00000	    0.00000	    0.00000	    0.00000	    0.00000
                     60	    0.00000	    0.00000	    0.00000	    0.00000	    0.00000	    0.00000	    0.00000	    0.00000	    0.00000
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              </tableData>
              <tableData breakPoint="20">
                              -20	       -10	        -5	        -2	         0	         2	         5	        10	        20
                    -10	    0.00443	    0.00143	    0.00098	    0.00055	    0.00021	    0.00007	  -0.00038	  -0.00086	    0.00100
                      3	  -0.00115	  -0.00323	  -0.00335	  -0.00337	  -0.00357	  -0.00421	  -0.00526	  -0.00380	  -0.00245
                      9	  -0.00472	  -0.00709	  -0.00759	  -0.00823	  -0.00884	  -0.00959	  -0.00983	  -0.01034	  -0.00818
                     15	  -0.00814	  -0.00569	  -0.00410	  -0.00339	  -0.00316	  -0.00286	  -0.00333	  -0.00308	  -0.00324
                     22	    0.00382	    0.00302	    0.00337	    0.00326	    0.00329	    0.00303	    0.00408	    0.00241	    0.00739
                     45	    0.00272	    0.00222	    0.00236	    0.00248	    0.00255	    0.00258	    0.00273	    0.00366	    0.00268
                     60	    0.00052	    0.00092	    0.00096	    0.00089	    0.00090	    0.00100	    0.00104	    0.00109	    0.00129
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              </tableData>
              <tableData breakPoint="50">
                              -20	       -10	        -5	        -2	         0	         2	         5	        10	        20
                    -10	    0.00367	  -0.00032	  -0.00110	  -0.00145	  -0.00203	  -0.00216	  -0.00289	  -0.00390	  -0.00104
                      3	  -0.00314	  -0.00759	  -0.00723	  -0.00744	  -0.00793	  -0.00912	  -0.01120	  -0.00880	  -0.00271
                      9	  -0.00917	  -0.01277	  -0.01458	  -0.01575	  -0.01689	  -0.01813	  -0.01844	  -0.02025	  -0.01556
                     15	  -0.01502	  -0.01437	  -0.01295	  -0.01301	  -0.01305	  -0.01315	  -0.01428	  -0.01441	  -0.01393
                     22	  -0.00327	    0.00279	    0.00500	    0.00547	    0.00578	    0.00509	    0.00527	    0.00526	    0.01157
                     45	    0.00428	    0.00398	    0.00426	    0.00442	    0.00450	    0.00453	    0.00479	    0.00598	    0.00464
                     60	    0.00120	    0.00177	    0.00184	    0.00171	    0.00170	    0.00188	    0.00202	    0.00205	    0.00224
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              </tableData>
          </table>
       </product>
    </function>
    <function name="aero/c/CMNDSPR">
    <description>YAWING MOMENT INCREMENT DUE TO SPOILERS RIGHT</description>
    <product>
          <table>
            <independentVar lookup="row">aero/alpha-deg</independentVar>
            <independentVar lookup="column">aero/beta-deg</independentVar>
            <independentVar lookup="table">fcs/speedbrake-right-deg</independentVar>
              <tableData breakPoint="0">
                              -20	       -10	        -5	        -2	         0	         2	         5	        10	        20
                    -10	    0.00000	    0.00000	    0.00000	    0.00000	    0.00000	    0.00000	    0.00000	    0.00000	    0.00000
                      3	    0.00000	    0.00000	    0.00000	    0.00000	    0.00000	    0.00000	    0.00000	    0.00000	    0.00000
                      9	    0.00000	    0.00000	    0.00000	    0.00000	    0.00000	    0.00000	    0.00000	    0.00000	    0.00000
                     15	    0.00000	    0.00000	    0.00000	    0.00000	    0.00000	    0.00000	    0.00000	    0.00000	    0.00000
                     22	    0.00000	    0.00000	    0.00000	    0.00000	    0.00000	    0.00000	    0.00000	    0.00000	    0.00000
                     45	    0.00000	    0.00000	    0.00000	    0.00000	    0.00000	    0.00000	    0.00000	    0.00000	    0.00000
                     60	    0.00000	    0.00000	    0.00000	    0.00000	    0.00000	    0.00000	    0.00000	    0.00000	    0.00000
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              </tableData>
              <tableData breakPoint="20">
                              -20	       -10	        -5	        -2	         0	         2	         5	        10	        20
                    -10	  -0.00100	    0.00086	    0.00038	  -0.00007	  -0.00021	  -0.00055	  -0.00098	  -0.00143	  -0.00443
                      3	    0.00245	    0.00380	    0.00526	    0.00421	    0.00357	    0.00337	    0.00335	    0.00323	    0.00115
                      9	    0.00818	    0.01034	    0.00983	    0.00967	    0.00884	    0.00831	    0.00759	    0.00709	    0.00472
                     15	    0.00324	    0.00308	    0.00333	    0.00286	    0.00328	    0.00339	    0.00410	    0.00569	    0.00814
                     22	  -0.00739	  -0.00302	  -0.00408	  -0.00338	  -0.00329	  -0.00361	  -0.00337	  -0.00363	  -0.00382
                     45	  -0.00169	  -0.00305	  -0.00273	  -0.00258	  -0.00255	  -0.00248	  -0.00236	  -0.00161	  -0.00173
                     60	  -0.00129	  -0.00109	  -0.00104	  -0.00100	  -0.00090	  -0.00089	  -0.00096	  -0.00092	  -0.00052
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              </tableData>
              <tableData breakPoint="50">
                              -20	       -10	        -5	        -2	         0	         2	         5	        10	        20
                    -10	    0.00104	    0.00390	    0.00289	    0.00216	    0.00203	    0.00145	    0.00110	    0.00032	  -0.00367
                      3	    0.00271	    0.00880	    0.01120	    0.00912	    0.00793	    0.00744	    0.00723	    0.00759	    0.00314
                      9	    0.01556	    0.02025	    0.01844	    0.01821	    0.01689	    0.01583	    0.01458	    0.01277	    0.00917
                     15	    0.01393	    0.01441	    0.01428	    0.01315	    0.01317	    0.01301	    0.01295	    0.01437	    0.01502
                     22	  -0.01157	  -0.00587	  -0.00527	  -0.00544	  -0.00578	  -0.00582	  -0.00500	  -0.00340	    0.00327
                     45	  -0.00365	  -0.00537	  -0.00479	  -0.00453	  -0.00450	  -0.00442	  -0.00426	  -0.00337	  -0.00329
                     60	  -0.00224	  -0.00205	  -0.00202	  -0.00188	  -0.00170	  -0.00171	  -0.00184	  -0.00177	  -0.00120
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              </tableData>
          </table>
       </product>
    </function>
    <function name="aero/c/CMNP">
    <description>YAW DAMPING DERIVATIVE</description>
    <product>
          <property>aero/pb</property>
          <table>
            <independentVar lookup="row">aero/alpha-deg</independentVar>
            <tableData>
                    -10		    0.23894
                     -5		    0.18132
                      4		  -0.05911
                     10		  -0.16751
                     16		  -0.14971
                     24		  -0.09160
                     50		  -0.03735
                     60		  -0.01163
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            </tableData>
          </table>
       </product>
    </function>
    <function name="aero/c/CMNR">
    <description>YAW MOMENT DUE TO ROLL RATE</description>
    <product>
          <property>aero/pb</property>
          <table>
            <independentVar lookup="row">aero/alpha-deg</independentVar>
            <tableData>
                    -10		  -0.15222
                     -5		  -0.15337
                      4		  -0.14208
                     10		  -0.13743
                     16		  -0.19490
                     24		  -0.21183
                     50		  -0.16577
                     60		  -0.11709
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            </tableData>
          </table>
       </product>
    </function>
    <function name="aero/coefficients/CDRAG">
      <sum>
          <property>aero/c/CFXB</property>
          <property>aero/c/CFXDAD</property>
          <property>aero/c/CFXDRD</property>
          <property>aero/c/CFXDSM</property>
          <property>aero/c/CFXDFM</property>
          <property>aero/c/CFXDSPL</property>
          <property>aero/c/CFXDSPR</property>
       </sum>
    </function>
  <axis name="DRAG">
    <function name="aero/force/DRAG">
    <product>
          <property>aero/qbar-psf</property>
          <property>metrics/Sw-sqft</property>
          <property>aero/coefficients/CDRAG</property>
       </product>
    </function>
  </axis>
    <function name="aero/coefficients/CROLL">
      <sum>
          <property>aero/c/CML1</property>
          <property>aero/c/CMLDAD</property>
          <property>aero/c/CMLDRD</property>
          <property>aero/c/CMLDSM</property>
          <property>aero/c/CMLDFM</property>
          <property>aero/c/CMLDSPL</property>
          <property>aero/c/CMLDSPR</property>
          <property>aero/c/CMLBETADOT</property>
          <property>aero/c/CMLP</property>
          <property>aero/c/CMLR</property>
       </sum>
    </function>
  <axis name="ROLL">
    <function name="aero/force/ROLL">
    <product>
          <property>aero/qbar-psf</property>
          <property>metrics/Sw-sqft</property>
          <property>metrics/bw-ft</property>
          <property>aero/coefficients/CROLL</property>
       </product>
    </function>
  </axis>
    <function name="aero/coefficients/CSIDE">
      <sum>
          <property>aero/c/CYDAD</property>
          <property>aero/c/CYDRD</property>
          <property>aero/c/CFYDSM</property>
          <property>aero/c/CFYDFM</property>
          <property>aero/c/CFYDSPL</property>
          <property>aero/c/CFYDSPR</property>
          <property>aero/c/CFYB</property>
          <property>aero/c/CFYP</property>
          <property>aero/c/CFYR</property>
       </sum>
    </function>
  <axis name="SIDE">
    <function name="aero/force/SIDE">
    <product>
          <property>aero/qbar-psf</property>
          <property>metrics/Sw-sqft</property>
          <property>aero/coefficients/CSIDE</property>
       </product>
    </function>
  </axis>
    <function name="aero/coefficients/CLIFT">
      <sum>
          <property>aero/c/CFZDAD</property>
          <property>aero/c/CFZDRD</property>
          <property>aero/c/CFZDSM</property>
          <property>aero/c/CFZDFM</property>
          <property>aero/c/CFZDSPL</property>
          <property>aero/c/CFZDSPR</property>
          <property>aero/c/CFZB</property>
       </sum>
    </function>
  <axis name="LIFT">
    <function name="aero/force/LIFT">
    <product>
          <property>aero/qbar-psf</property>
          <property>metrics/Sw-sqft</property>
          <property>aero/coefficients/CLIFT</property>
       </product>
    </function>
  </axis>
    <function name="aero/coefficients/CPITCH">
      <sum>
          <property>aero/c/CMMDAD</property>
          <property>aero/c/CMMDRD</property>
          <property>aero/c/CMMDSM</property>
          <property>aero/c/CMMDFM</property>
          <property>aero/c/CMMDSPL</property>
          <property>aero/c/CMMDSPR</property>
          <property>aero/c/CMM1</property>
          <property>aero/c/CMMALPHADOT</property>
          <property>aero/c/CMMBETADOT</property>
          <property>aero/c/CMMQ</property>
       </sum>
    </function>
  <axis name="PITCH">
    <function name="aero/force/PITCH">
    <product>
          <property>aero/qbar-psf</property>
          <property>metrics/Sw-sqft</property>
          <property>metrics/cbarw-ft</property>
          <property>aero/coefficients/CPITCH</property>
       </product>
    </function>
  </axis>
    <function name="aero/coefficients/CYAW">
      <sum>
          <property>aero/c/CMNDAD</property>
          <property>aero/c/CMNDRD</property>
          <property>aero/c/CMNDSM</property>
          <property>aero/c/CMNDFM</property>
          <property>aero/c/CMNDSPL</property>
          <property>aero/c/CMNDSPR</property>
          <property>aero/c/CMN1</property>
          <property>aero/c/CMNBETADOT</property>
          <property>aero/c/CMNP</property>
          <property>aero/c/CMNR</property>
       </sum>
    </function>
  <axis name="YAW">
    <function name="aero/force/YAW">
    <product>
          <property>aero/qbar-psf</property>
          <property>metrics/Sw-sqft</property>
          <property>metrics/bw-ft</property>
          <property>aero/coefficients/CYAW</property>
       </product>
    </function>
  </axis>
</aerodynamics>
